# Worksheet setting: ORIGIN = 1
# Kapros Panagiotis 03118926 Semester Report Team 2 Cartesian Form - Team 2
# Δεδομένα Κλάδων
r := [0.02, 0.02, 0.05, 0.00]
x := [0.06, 0.06, 0.10, 0.08]
b := [0.20, 0.25, 0.00, 0.00]
# Μετασχηματιστής
t := 1.15
y_L := 1/0.08i = -12.5i
y_s := 0j
k := 1/(1 + t^2) = 0.430571
# Γραμμές Μεταφοράς
y_12 := 1/(0.02 + 0.06i) = 5 - 15i
y_13 := 1/(0.02 + 0.06i) = 5 - 15i
y_23 := 1/(0.05 + 0.1i) = 4 - 8i
y_24n := t*2*k*y_L = -12.3789i
y_24 := y_L = -12.5i
y_s12 := 0.2i/2 = 0.1i
y_s13 := 0.25i/2 = 0.125i
y_s23 := 0
y_s24n := y_s/2 + 2*t*(t - 1)*k*y_24n = -1.83885i
y_s42n := y_s/2 + 2*(1 - t)*k*y_24n = 1.599i
y_s24 := 0
y_21 := y_12
y_31 := y_13
y_32 := y_23
y_42 := y_24
y_s21 := y_s12
y_s31 := y_s13
y_s32 := y_s23
y_s42 := y_s24
# Γεννήτριες
V_1 := 1.00
δ_1 := 0.00 deg
# Φορτία και λοιποί κόμβοι
S_D2 := 0.5 + 0.3i
S_D3 := 1.2 + 0.8i
S_D4 := 0.25 + 0.1i
S_G2 := 0
S_G3 := 0
S_G4 := 0
# Ζυγός 1 -> Ζυγός ταλάντωσης
# Ζυγός 2 -> PQ
# Ζυγός 3 -> PQ
# Ζυγός 4 -> PQ
# Ροή Ενεργού - Άεργου Ισχύος στους κόμβους 2 και 4 | Δεδομένα από εκφώνηση
v := [1, 0.9545, 0.9375, 0.9458]
d := [0, -2.6768, -3.2006, -3.9462]*deg
sum_01 := Re(y_s21 + y_s23 + y_s24 + y_21 + y_23 + y_24) = 9
sum_02 := Im(y_s21 + y_s23 + y_s24 + y_21 + y_23 + y_24) = -35.4
sum_03 := Re(y_s42 + y_s42) = 0
sum_13 := Re(y_s24 + y_s24) = 0
sum_04 := Im(y_s42 + y_42) = -12.5
sum_14 := Im(y_s24 + y_24) = -12.5
sum_05 := Re(y_21)*cos(d[1, 2] - d[1, 1]) + Im(y_21)*sin(d[1, 2] - d[1, 1]) = 5.69507
sum_06 := Re(y_23)*cos(d[1, 2] - d[1, 3]) + Im(y_23)*sin(d[1, 2] - d[1, 3]) = 3.9267
sum_07 := Re(y_24)*cos(d[1, 2] - d[1, 4]) + Im(y_24)*sin(d[1, 2] - d[1, 4]) = -0.276917
sum_08 := Re(y_42)*cos(d[1, 4] - d[1, 2]) + Im(y_42)*sin(d[1, 4] - d[1, 2]) = 0.276917
sum_09 := Re(y_21)*sin(d[1, 2] - d[1, 1]) - Im(y_21)*cos(d[1, 2] - d[1, 1]) = 14.7501
sum_10 := Re(y_23)*sin(d[1, 2] - d[1, 3]) - Im(y_23)*cos(d[1, 2] - d[1, 3]) = 8.03623
sum_11 := Re(y_24)*sin(d[1, 2] - d[1, 4]) - Im(y_24)*cos(d[1, 2] - d[1, 4]) = 12.4969
sum_12 := Re(y_42)*sin(d[1, 4] - d[1, 2]) - Im(y_42)*cos(d[1, 4] - d[1, 2]) = 12.4969
P_24 := v[1, 2]^2*sum_13 - v[1, 2]*v[1, 4]*sum_07 = 0.249992
P_42 := v[1, 4]^2*sum_03 - v[1, 4]*v[1, 2]*sum_08 = -0.249992
Q_24 := -v[1, 2]^2*sum_14 - (v[1, 2]*v[1, 4]*sum_11) = 0.106571
Q_42 := -v[1, 4]^2*sum_04 - (v[1, 4]*v[1, 2]*sum_12) = -0.100086
Y_11 := y_s12 + y_12 + y_s13 + y_13 = 10 - 29.775i
Y_12 := -y_12 = -5 + 15i
Y_13 := -y_13 = -5 + 15i
Y_14 := 0
Y_21 := Y_12 = -5 + 15i
Y_22 := y_21 + y_23 + y_24 + y_s21 + y_s23 + y_s24 = 9 - 35.4i
Y_23 := -y_23 = -4 + 8i
Y_24 := -y_24 = 12.5i
Y_31 := Y_13 = -5 + 15i
Y_32 := Y_23 = -4 + 8i
Y_33 := y_31 + y_s31 + y_32 + y_s32 = 9 - 22.875i
Y_34 := 0
Y_41 := 0
Y_42 := Y_24 = 12.5i
Y_43 := 0
Y_44 := y_42 + y_s42 = -12.5i
Y := [Y_11, Y_12, Y_13, Y_14; Y_21, Y_22, Y_23, Y_24; Y_31, Y_32, Y_33, Y_34; Y_41, Y_42, Y_43, Y_44] = [
    10 - 29.775i, -5 + 15i, -5 + 15i, 0;
    -5 + 15i, 9 - 35.4i, -4 + 8i, 12.5i;
    -5 + 15i, -4 + 8i, 9 - 22.875i, 0;
    0, 12.5i, 0, -12.5i
]
# Ανάλυση AC ροής φορτίου
G := Re(Y) = [10, -5, -5, 0; -5, 9, -4, 0; -5, -4, 9, 0; 0, 0, 0, 0]
B := Im(Y) = [-29.775, 15, 15, 0; 15, -35.4, 8, 12.5; 15, 8, -22.875, 0; 0, 12.5, 0, -12.5]
# V_k = E_k + jF_k
E_1 := V_1 = 1
E_2 := 1
E_3 := 1
E_4 := 1
F_1 := 0
F_2 := 0
F_3 := 0
F_4 := 0
# Εξισώσεις Ενεργούς και Άεργους Ισχύος 1^η Επανάληψη
# k = 2, m = 1 and 3 and 4
sum_21 := G[2, 1]*F_1 + G[2, 3]*F_3 + G[2, 4]*F_4 + B[2, 1]*E_1 + B[2, 3]*E_3 + B[2, 4]*E_4 = 35.5
sum_22 := G[2, 1]*E_1 + G[2, 3]*E_3 + G[2, 4]*E_4 - B[2, 1]*F_1 - B[2, 3]*F_3 - B[2, 4]*F_4 = -9
f_p2 := G[2, 2]*(E_2^2 + F_2^2) + E_2*sum_22 + F_2*sum_21 = 0
b_p2 := Re(S_G2 - S_D2) = -0.5
f_q2 := -(B[2, 2]*(E_2^2 + F_2^2)) - E_2*sum_21 + F_2*sum_22 = -0.1
b_q2 := Im(S_G2 - S_D2) = -0.3
# k = 3, m = 1 and 2
sum_31 := G[3, 1]*F_1 + G[3, 2]*F_2 + B[3, 1]*E_1 + B[3, 2]*E_2 = 23
sum_32 := G[3, 1]*E_1 + G[3, 2]*E_2 - B[3, 1]*F_1 - B[3, 2]*F_2 = -9
f_p3 := G[3, 3]*(E_3^2 + F_3^2) + E_3*sum_32 + F_3*sum_31 = 0
b_p3 := Re(S_G3 - S_D3) = -1.2
f_q3 := -B[3, 3]*(E_3^2 + F_3^2) - E_3*sum_31 + F_3*sum_32 = -0.125
b_q3 := Im(S_G3 - S_D3) = -0.8
# k = 4, m = 2
sum_41 := G[4, 2]*F_2 + B[4, 2]*E_2 = 12.5
sum_42 := G[4, 2]*E_2 - B[4, 2]*F_2 = 0
f_p4 := G[4, 4]*(E_4^2 + F_4^2) + E_4*sum_42 + F_4*sum_41 = 0
b_p4 := Re(S_G4 - S_D4) = -0.25
f_q4 := -B[4, 4]*(E_4^2 + F_4^2) - E_4*sum_41 + F_4*sum_42 = 0
b_q4 := Im(S_G4 - S_D4) = -0.1
[E_2, E_3, E_4, F_2, F_3, F_4]
# Κατάστρωση Ιακωβιανής Μήτρας
# θf_pk/θE_k
J_11 := 2*E_2*G[2, 2] + sum_22 = 9
[
    J_11, J_12, J_13, J_14, J_15, J_16;
    J_21, J_22, J_23, J_24, J_25, J_26;
    J_31, J_32, J_33, J_34, J_35, J_36;
    J_41, J_42, J_43, J_44, J_45, J_46;
    J_51, J_52, J_53, J_54, J_55, J_56;
    J_61, J_62, J_63, J_64, J_65, J_66
]
[f_p2; f_p3; f_p4; f_q2; f_q3; f_q4]
J_22 := 2*E_3*G[3, 3] + sum_32 = 9
J_33 := 2*E_4*G[4, 4] + sum_42 = 0
# θf_pk/θF_k
J_14 := 2*F_2*G[2, 2] + sum_21 = 35.5
J_25 := 2*F_3*G[3, 3] + sum_31 = 23
J_36 := 2*F_4*G[4, 4] + sum_41 = 12.5
# θf_pk/θE_m
J_12 := E_2*G[2, 3] + F_2*B[2, 3] = -4
J_13 := E_2*G[2, 4] + F_2*B[2, 4] = 0
J_21 := E_3*G[3, 2] + F_3*B[3, 2] = -4
J_23 := E_3*G[3, 4] + F_3*B[3, 4] = 0
J_31 := E_4*G[4, 2] + F_4*B[4, 2] = 0
J_32 := E_4*G[4, 3] + F_4*B[4, 3] = 0
# θf_pk/θF_m
J_15 := -(E_2*B[2, 3]) + F_2*G[2, 3] = -8
J_16 := -E_2*B[2, 4] + F_2*G[2, 4] = -12.5
J_24 := -E_3*B[3, 2] + F_3*G[3, 2] = -8
J_26 := -E_3*B[3, 4] + F_3*G[3, 4] = 0
J_34 := -E_4*B[4, 2] + F_4*G[4, 2] = -12.5
J_35 := -E_4*B[4, 3] + F_4*G[4, 3] = 0
# θf_q_k/θE_k
J_41 := -2*E_2*B[2, 2] - sum_21 = 35.3
J_52 := -2*E_3*B[3, 3] - sum_31 = 22.75
J_63 := -2*E_4*B[4, 4] - sum_41 = 12.5
# θf_q_k/θF_k
J_44 := -2*F_2*B[2, 2] + sum_22 = -9
J_55 := -2*F_3*B[3, 3] + sum_32 = -9
J_66 := -2*F_4*B[4, 4] + sum_42 = 0
# θf_q_k/θE_m
J_42 := -E_2*B[2, 3] + F_2*G[2, 3] = -8
J_43 := -E_2*B[2, 4] + F_2*G[2, 4] = -12.5
J_51 := -E_3*B[3, 2] + F_3*G[3, 2] = -8
J_53 := -E_3*B[3, 4] + F_3*G[3, 4] = 0
J_61 := -E_4*B[4, 2] + F_4*G[4, 2] = -12.5
J_62 := -E_4*B[4, 3] + F_4*G[4, 3] = 0
# θf_q_k/θF_m
J_45 := -E_2*G[2, 3] - F_2*B[2, 3] = 4
J_46 := -E_2*G[2, 4] - F_2*B[2, 4] = 0
J_54 := -E_3*G[3, 2] - F_3*B[3, 2] = 4
J_56 := -E_3*G[3, 4] - F_3*B[3, 4] = 0
J_64 := -E_4*G[4, 2] - F_4*B[4, 2] = 0
J_65 := -E_4*G[4, 3] - F_4*B[4, 3] = 0
J := [
    J_11, J_12, J_13, J_14, J_15, J_16;
    J_21, J_22, J_23, J_24, J_25, J_26;
    J_31, J_32, J_33, J_34, J_35, J_36;
    J_41, J_42, J_43, J_44, J_45, J_46;
    J_51, J_52, J_53, J_54, J_55, J_56;
    J_61, J_62, J_63, J_64, J_65, J_66
] = [
    9, -4, 0, 35.5, -8, -12.5;
    -4, 9, 0, -8, 23, 0;
    0, 0, 0, -12.5, 0, 12.5;
    35.3, -8, -12.5, -9, 4, 0;
    -8, 22.75, 0, 4, -9, 0;
    -12.5, 0, 12.5, 0, 0, 0
]
b := [b_p2 - f_p2; b_p3 - f_p3; b_p4 - f_p4; b_q2 - f_q2; b_q3 - f_q3; b_q4 - f_q4] = [-0.5; -1.2; -0.25; -0.2; -0.675; -0.1]
x := [E_2; E_3; E_4; F_2; F_3; F_4]
x_0 := x = [1; 1; 1; 0; 0; 0]
x := x + J^-1*b = [0.958385; 0.942757; 0.950385; -0.0445426; -0.0525047; -0.0645426]
[E_2; E_3; E_4; F_2; F_3; F_4] := x
x_1 := x = [0.958385; 0.942757; 0.950385; -0.0445426; -0.0525047; -0.0645426]
V_2 := (E_2^2 + F_2^2)^0.5 = 0.95942
δ_2 := atan(F_2/E_2) = -2.66101 deg
V_3 := (E_3^2 + F_3^2)^0.5 = 0.944217
δ_3 := atan(F_3/E_3) = -3.18767 deg
δ_4 := atan(F_4/E_4) = -3.88511 deg
V_4 := (E_4^2 + F_4^2)^0.5 = 0.952575
Δx_0 := x_1 - x_0
vectorize(|Δx_0|) = [0.0416146; 0.0572434; 0.0496146; 0.0445426; 0.0525047; 0.0645426]
max(vectorize(|Δx_0|)) = 0.0645426
# Εξισώσεις Ενεργούς και Άεργους Ισχύος 2^η Επανάληψη
# k = 2, m = 1 and 3 and 4
sum_21 := G[2, 1]*F_1 + G[2, 3]*F_3 + G[2, 4]*F_4 + B[2, 1]*E_1 + B[2, 3]*E_3 + B[2, 4]*E_4 = 34.6319
sum_22 := G[2, 1]*E_1 + G[2, 3]*E_3 + G[2, 4]*E_4 - B[2, 1]*F_1 - B[2, 3]*F_3 - B[2, 4]*F_4 = -7.54421
f_p2 := G[2, 2]*(E_2^2 + F_2^2) + E_2*sum_22 + F_2*sum_21 = -0.488472
b_p2 := Re(S_G2 - S_D2) = -0.5
f_q2 := -B[2, 2]*(E_2^2 + F_2^2) - E_2*sum_21 + F_2*sum_22 = -0.269431
b_q2 := Im(S_G2 - S_D2) = -0.3
# k = 3, m = 1 and 2
sum_31 := G[3, 1]*F_1 + G[3, 2]*F_2 + B[3, 1]*E_1 + B[3, 2]*E_2 = 22.8453
sum_32 := G[3, 1]*E_1 + G[3, 2]*E_2 - B[3, 1]*F_1 - B[3, 2]*F_2 = -8.4772
f_p3 := G[3, 3]*(E_3^2 + F_3^2) + E_3*sum_32 + F_3*sum_31 = -1.1675
b_p3 := Re(S_G3 - S_D3) = -1.2
f_q3 := -B[3, 3]*(E_3^2 + F_3^2) - E_3*sum_31 + F_3*sum_32 = -0.69829
b_q3 := Im(S_G3 - S_D3) = -0.8
# k = 4, m = 2
sum_41 := G[4, 2]*F_2 + B[4, 2]*E_2 = 11.9798
sum_42 := G[4, 2]*E_2 - B[4, 2]*F_2 = 0.556783
f_p4 := G[4, 4]*(E_4^2 + F_4^2) + E_4*sum_42 + F_4*sum_41 = -0.244051
b_p4 := Re(S_G4 - S_D4) = -0.25
f_q4 := -B[4, 4]*(E_4^2 + F_4^2) - E_4*sum_41 + F_4*sum_42 = -0.0789029
b_q4 := Im(S_G4 - S_D4) = -0.1
[E_2, E_3, E_4, F_2, F_3, F_4]
# Κατάστρωση Ιακωβιανής Μήτρας
# θf_pk/θE_k
J_11 := 2*E_2*G[2, 2] + sum_22 = 9.70673
[
    J_11, J_12, J_13, J_14, J_15, J_16;
    J_21, J_22, J_23, J_24, J_25, J_26;
    J_31, J_32, J_33, J_34, J_35, J_36;
    J_41, J_42, J_43, J_44, J_45, J_46;
    J_51, J_52, J_53, J_54, J_55, J_56;
    J_61, J_62, J_63, J_64, J_65, J_66
]
[f_p2; f_p3; f_p4; f_q2; f_q3; f_q4]
J_22 := 2*E_3*G[3, 3] + sum_32 = 8.49242
J_33 := 2*E_4*G[4, 4] + sum_42 = 0.556783
# θf_pk/θF_k
J_14 := 2*F_2*G[2, 2] + sum_21 = 33.8301
J_25 := 2*F_3*G[3, 3] + sum_31 = 21.9002
J_36 := 2*F_4*G[4, 4] + sum_41 = 11.9798
# θf_pk/θE_m
J_12 := E_2*G[2, 3] + F_2*B[2, 3] = -4.18988
J_13 := E_2*G[2, 4] + F_2*B[2, 4] = -0.556783
J_21 := E_3*G[3, 2] + F_3*B[3, 2] = -4.19106
J_23 := E_3*G[3, 4] + F_3*B[3, 4] = 0
J_31 := E_4*G[4, 2] + F_4*B[4, 2] = -0.806783
J_32 := E_4*G[4, 3] + F_4*B[4, 3] = 0
# θf_pk/θF_m
J_15 := -E_2*B[2, 3] + F_2*G[2, 3] = -7.48891
J_16 := -E_2*B[2, 4] + F_2*G[2, 4] = -11.9798
J_24 := -E_3*B[3, 2] + F_3*G[3, 2] = -7.33203
J_26 := -E_3*B[3, 4] + F_3*G[3, 4] = 0
J_34 := -E_4*B[4, 2] + F_4*G[4, 2] = -11.8798
J_35 := -E_4*B[4, 3] + F_4*G[4, 3] = 0
# θf_q_k/θE_k
J_41 := -2*E_2*B[2, 2] - sum_21 = 33.2218
J_52 := -2*E_3*B[3, 3] - sum_31 = 20.2859
J_63 := -2*E_4*B[4, 4] - sum_41 = 11.7798
# θf_q_k/θF_k
J_44 := -2*F_2*B[2, 2] + sum_22 = -10.6978
J_55 := -2*F_3*B[3, 3] + sum_32 = -10.8793
J_66 := -2*F_4*B[4, 4] + sum_42 = -1.05678
# θf_q_k/θE_m
J_42 := -E_2*B[2, 3] + F_2*G[2, 3] = -7.48891
J_43 := -E_2*B[2, 4] + F_2*G[2, 4] = -11.9798
J_51 := -E_3*B[3, 2] + F_3*G[3, 2] = -7.33203
J_53 := -E_3*B[3, 4] + F_3*G[3, 4] = 0
J_61 := -E_4*B[4, 2] + F_4*G[4, 2] = -11.8798
J_62 := -E_4*B[4, 3] + F_4*G[4, 3] = 0
# θf_q_k/θF_m
J_45 := -E_2*G[2, 3] - F_2*B[2, 3] = 4.18988
J_46 := -E_2*G[2, 4] - F_2*B[2, 4] = 0.556783
J_54 := -E_3*G[3, 2] - F_3*B[3, 2] = 4.19106
J_56 := -E_3*G[3, 4] - F_3*B[3, 4] = 0
J_64 := -E_4*G[4, 2] - F_4*B[4, 2] = 0.806783
J_65 := -E_4*G[4, 3] - F_4*B[4, 3] = 0
J := [
    J_11, J_12, J_13, J_14, J_15, J_16;
    J_21, J_22, J_23, J_24, J_25, J_26;
    J_31, J_32, J_33, J_34, J_35, J_36;
    J_41, J_42, J_43, J_44, J_45, J_46;
    J_51, J_52, J_53, J_54, J_55, J_56;
    J_61, J_62, J_63, J_64, J_65, J_66
] = [
    9.70673, -4.18988, -0.556783, 33.8301, -7.48891, -11.9798;
    -4.19106, 8.49242, 0, -7.33203, 21.9002, 0;
    -0.806783, 0, 0.556783, -11.8798, 0, 11.9798;
    33.2218, -7.48891, -11.9798, -10.6978, 4.18988, 0.556783;
    -7.33203, 20.2859, 0, 4.19106, -10.8793, 0;
    -11.8798, 0, 11.7798, 0.806783, 0, -1.05678
]
b := [b_p2 - f_p2; b_p3 - f_p3; b_p4 - f_p4; b_q2 - f_q2; b_q3 - f_q3; b_q4 - f_q4] = [-0.011528; -0.0325001; -0.00594938; -0.030569; -0.10171; -0.0210971]
x := [E_2; E_3; E_4; F_2; F_3; F_4]
x_1 := x = [0.958385; 0.942757; 0.950385; -0.0445426; -0.0525047; -0.0645426]
x := x + J^-1*b = [0.953494; 0.936069; 0.943615; -0.0445769; -0.0523429; -0.065088]
[E_2; E_3; E_4; F_2; F_3; F_4] := x
x_2 := x = [0.953494; 0.936069; 0.943615; -0.0445769; -0.0523429; -0.065088]
V_2 := (E_2^2 + F_2^2)^0.5 = 0.954535
δ_2 := atan(F_2/E_2) = -2.67669 deg
V_3 := (E_3^2 + F_3^2)^0.5 = 0.937531
δ_3 := atan(F_3/E_3) = -3.20052 deg
δ_4 := atan(F_4/E_4) = -3.94586 deg
V_4 := (E_4^2 + F_4^2)^0.5 = 0.945857
Δx_1 := x_2 - x_1
vectorize(|Δx_1|) = [0.00489156; 0.00668794; 0.00677061; 3.42788e-5; 0.000161849; 0.000545356]
max(vectorize(|Δx_1|)) = 0.00677061
# Εξισώσεις Ενεργούς και Άεργους Ισχύος 3^η Επανάληψη
# k = 2, m = 1 and 3 and 4
sum_21 := G[2, 1]*F_1 + G[2, 3]*F_3 + G[2, 4]*F_4 + B[2, 1]*E_1 + B[2, 3]*E_3 + B[2, 4]*E_4 = 34.4931
sum_22 := G[2, 1]*E_1 + G[2, 3]*E_3 + G[2, 4]*E_4 - B[2, 1]*F_1 - B[2, 3]*F_3 - B[2, 4]*F_4 = -7.51193
f_p2 := G[2, 2]*(E_2^2 + F_2^2) + E_2*sum_22 + F_2*sum_21 = -0.499938
b_p2 := Re(S_G2 - S_D2) = -0.5
f_q2 := -B[2, 2]*(E_2^2 + F_2^2) - E_2*sum_21 + F_2*sum_22 = -0.299833
b_q2 := Im(S_G2 - S_D2) = -0.3
# k = 3, m = 1 and 2
sum_31 := G[3, 1]*F_1 + G[3, 2]*F_2 + B[3, 1]*E_1 + B[3, 2]*E_2 = 22.8063
sum_32 := G[3, 1]*E_1 + G[3, 2]*E_2 - B[3, 1]*F_1 - B[3, 2]*F_2 = -8.45736
f_p3 := G[3, 3]*(E_3^2 + F_3^2) + E_3*sum_32 + F_3*sum_31 = -1.19974
b_p3 := Re(S_G3 - S_D3) = -1.2
f_q3 := -B[3, 3]*(E_3^2 + F_3^2) - E_3*sum_31 + F_3*sum_32 = -0.799234
b_q3 := Im(S_G3 - S_D3) = -0.8
# k = 4, m = 2
sum_41 := G[4, 2]*F_2 + B[4, 2]*E_2 = 11.9187
sum_42 := G[4, 2]*E_2 - B[4, 2]*F_2 = 0.557211
f_p4 := G[4, 4]*(E_4^2 + F_4^2) + E_4*sum_42 + F_4*sum_41 = -0.24997
b_p4 := Re(S_G4 - S_D4) = -0.25
f_q4 := -B[4, 4]*(E_4^2 + F_4^2) - E_4*sum_41 + F_4*sum_42 = -0.0998375
b_q4 := Im(S_G4 - S_D4) = -0.1
[E_2, E_3, E_4, F_2, F_3, F_4]
# Κατάστρωση Ιακωβιανής Μήτρας
# θf_pk/θE_k
J_11 := 2*E_2*G[2, 2] + sum_22 = 9.65096
[
    J_11, J_12, J_13, J_14, J_15, J_16;
    J_21, J_22, J_23, J_24, J_25, J_26;
    J_31, J_32, J_33, J_34, J_35, J_36;
    J_41, J_42, J_43, J_44, J_45, J_46;
    J_51, J_52, J_53, J_54, J_55, J_56;
    J_61, J_62, J_63, J_64, J_65, J_66
]
[f_p2; f_p3; f_p4; f_q2; f_q3; f_q4]
J_22 := 2*E_3*G[3, 3] + sum_32 = 8.39187
J_33 := 2*E_4*G[4, 4] + sum_42 = 0.557211
# θf_pk/θF_k
J_14 := 2*F_2*G[2, 2] + sum_21 = 33.6907
J_25 := 2*F_3*G[3, 3] + sum_31 = 21.8641
J_36 := 2*F_4*G[4, 4] + sum_41 = 11.9187
# θf_pk/θE_m
J_12 := E_2*G[2, 3] + F_2*B[2, 3] = -4.17059
J_13 := E_2*G[2, 4] + F_2*B[2, 4] = -0.557211
J_21 := E_3*G[3, 2] + F_3*B[3, 2] = -4.16302
J_23 := E_3*G[3, 4] + F_3*B[3, 4] = 0
J_31 := E_4*G[4, 2] + F_4*B[4, 2] = -0.8136
J_32 := E_4*G[4, 3] + F_4*B[4, 3] = 0
# θf_pk/θF_m
J_15 := -E_2*B[2, 3] + F_2*G[2, 3] = -7.44964
J_16 := -E_2*B[2, 4] + F_2*G[2, 4] = -11.9187
J_24 := -E_3*B[3, 2] + F_3*G[3, 2] = -7.27918
J_26 := -E_3*B[3, 4] + F_3*G[3, 4] = 0
J_34 := -E_4*B[4, 2] + F_4*G[4, 2] = -11.7952
J_35 := -E_4*B[4, 3] + F_4*G[4, 3] = 0
# θf_q_k/θE_k
J_41 := -2*E_2*B[2, 2] - sum_21 = 33.0143
J_52 := -2*E_3*B[3, 3] - sum_31 = 20.0189
J_63 := -2*E_4*B[4, 4] - sum_41 = 11.6717
# θf_q_k/θF_k
J_44 := -2*F_2*B[2, 2] + sum_22 = -10.668
J_55 := -2*F_3*B[3, 3] + sum_32 = -10.852
J_66 := -2*F_4*B[4, 4] + sum_42 = -1.06999
# θf_q_k/θE_m
J_42 := -E_2*B[2, 3] + F_2*G[2, 3] = -7.44964
J_43 := -E_2*B[2, 4] + F_2*G[2, 4] = -11.9187
J_51 := -E_3*B[3, 2] + F_3*G[3, 2] = -7.27918
J_53 := -E_3*B[3, 4] + F_3*G[3, 4] = 0
J_61 := -E_4*B[4, 2] + F_4*G[4, 2] = -11.7952
J_62 := -E_4*B[4, 3] + F_4*G[4, 3] = 0
# θf_q_k/θF_m
J_45 := -E_2*G[2, 3] - F_2*B[2, 3] = 4.17059
J_46 := -E_2*G[2, 4] - F_2*B[2, 4] = 0.557211
J_54 := -E_3*G[3, 2] - F_3*B[3, 2] = 4.16302
J_56 := -E_3*G[3, 4] - F_3*B[3, 4] = 0
J_64 := -E_4*G[4, 2] - F_4*B[4, 2] = 0.8136
J_65 := -E_4*G[4, 3] - F_4*B[4, 3] = 0
J := [
    J_11, J_12, J_13, J_14, J_15, J_16;
    J_21, J_22, J_23, J_24, J_25, J_26;
    J_31, J_32, J_33, J_34, J_35, J_36;
    J_41, J_42, J_43, J_44, J_45, J_46;
    J_51, J_52, J_53, J_54, J_55, J_56;
    J_61, J_62, J_63, J_64, J_65, J_66
] = [
    9.65096, -4.17059, -0.557211, 33.6907, -7.44964, -11.9187;
    -4.16302, 8.39187, 0, -7.27918, 21.8641, 0;
    -0.8136, 0, 0.557211, -11.7952, 0, 11.9187;
    33.0143, -7.44964, -11.9187, -10.668, 4.17059, 0.557211;
    -7.27918, 20.0189, 0, 4.16302, -10.852, 0;
    -11.7952, 0, 11.6717, 0.8136, 0, -1.06999
]
b := [b_p2 - f_p2; b_p3 - f_p3; b_p4 - f_p4; b_q2 - f_q2; b_q3 - f_q3; b_q4 - f_q4] = [-6.22441e-5; -0.000263789; -3.04444e-5; -0.000167095; -0.000766177; -0.000162513]
x := [E_2; E_3; E_4; F_2; F_3; F_4]
x_2 := x = [0.953494; 0.936069; 0.943615; -0.0445769; -0.0523429; -0.065088]
x := x + J^-1*b = [0.95346; 0.936018; 0.943566; -0.0445768; -0.0523421; -0.0650904]
[E_2; E_3; E_4; F_2; F_3; F_4] := x
x_3 := x = [0.95346; 0.936018; 0.943566; -0.0445768; -0.0523421; -0.0650904]
V_2 := (E_2^2 + F_2^2)^0.5 = 0.954501
δ_2 := atan(F_2/E_2) = -2.67678 deg
V_3 := (E_3^2 + F_3^2)^0.5 = 0.937481
δ_3 := atan(F_3/E_3) = -3.20064 deg
δ_4 := atan(F_4/E_4) = -3.94621 deg
V_4 := (E_4^2 + F_4^2)^0.5 = 0.945809
Δx_2 := x_3 - x_2
vectorize(|Δx_2|) = [3.38633e-5; 5.0184e-5; 4.8381e-5; 1.47119e-7; 7.97919e-7; 2.45849e-6]
max(vectorize(|Δx_2|)) = 5.0184e-5
P_12 := Re(y_s12 + y_12)*(E_1^2 + F_1^2) - F_1*(Re(y_12)*E_1 - Im(y_12)*F_1) - F_1*(Re(y_12)*F_1 + E_1*Im(y_12)) = 5
Q_12 := -Im(y_s12 + y_12)*(E_1^2 + F_1^2) + E_1*(Re(y_12)*F_1 + Im(y_12)*E_1) - F_1*(Re(y_12)*E_1 - Im(y_12)*F_1) = -0.1
P_13 := Re(y_s13 + y_13)*(E_1^2 + F_1^2) - F_1*(Re(y_13)*E_1 - Im(y_13)*F_1) - F_1*(Re(y_13)*F_1 + E_1*Im(y_13)) = 5
Q_13 := -Im(y_s13 + y_13)*(E_1^2 + F_1^2) + E_1*(Re(y_13)*F_1 + Im(y_13)*E_1) - F_1*(Re(y_13)*E_1 - Im(y_13)*F_1) = -0.125
P_32 := Re(y_s32 + y_32)*(E_3^2 + F_3^2) - F_3*(Re(y_32)*E_3 - Im(y_32)*F_3) - F_3*(Re(y_32)*F_3 + E_3*Im(y_32)) = 3.28663
Q_32 := -Im(y_s32 + y_32)*(E_3^2 + F_3^2) + E_3*(Re(y_32)*F_3 + Im(y_32)*E_3) - F_3*(Re(y_32)*E_3 - Im(y_32)*F_3) = 1.66533e-16
P_24 := Re(y_s24 + y_24)*(E_2^2 + F_2^2) - F_2*(Re(y_24)*E_2 - Im(y_24)*F_2) - F_2*(Re(y_24)*F_2 + E_2*Im(y_24)) = -0.556115
Q_24 := -Im(y_s24 + y_24)*(E_2^2 + F_2^2) + E_2*(Re(y_24)*F_2 + Im(y_24)*E_2) - F_2*(Re(y_24)*E_2 - Im(y_24)*F_2) = 5.10009e-16
P_απ12 := Re(S_D2) - P_12 = -4.5
P_απ24 := Re(S_D4) - P_24 = 0.806115
P_απ13 := Re(S_D3) - P_13 = -3.8
# DC ανάλυση ροής φορτίου
C_12 := V_1*V_2*Im(y_12) = -14.3175
C_13 := V_1*V_3*Im(y_13) = -14.0622
C_21 := C_12 = -14.3175
C_23 := V_2*V_3*Im(y_23) = -7.15861
C_24 := V_2*V_4*Im(y_24) = -11.2847
C_31 := C_13 = -14.0622
C_32 := C_23 = -7.15861
C_34 := 0
C_42 := C_24 = -11.2847
C_43 := C_34 = 0
C_11 := -(C_12 + C_13) = 28.3797
C_22 := -(C_21 + C_23 + C_24) = 32.7608
C_33 := -(C_31 + C_32) = 21.2208
C_44 := -C_42 = 11.2847
C := [C_22, C_23, C_24; C_32, C_33, C_34; C_42, C_43, C_44] = [32.7608, -7.15861, -11.2847; -7.15861, 21.2208, 0; -11.2847, 0, 11.2847]
C^-1 = [0.0524624, 0.0176976, 0.0524624; 0.0176976, 0.0530936, 0.0176976; 0.0524624, 0.0176976, 0.141078]
P := [S_G2 - Re(S_D2); S_G3 - Re(S_D3); S_G4 - Re(S_D4)] = [-0.5; -1.2; -0.25]
δ := C^-1*P
δ = [-0.060584; -0.0769856; -0.0827379] rad
δ = [-3.47121; -4.41095; -4.74053] deg
# Ενεργές Ροές Ανά Μονάδα
p_12 := -Im(y_12)*(δ_1 - δ_2) = 0.700779
p_21 := -Im(y_21)*(δ_2 - δ_1) = -0.700779
p_13 := -Im(y_13)*(δ_1 - δ_3) = 0.837926
p_31 := -Im(y_31)*(δ_3 - δ_1) = -0.837926
p_23 := -Im(y_23)*(δ_2 - δ_3) = 0.073145
p_32 := -Im(y_32)*(δ_3 - δ_2) = -0.073145
p_24 := -Im(y_24)*(δ_2 - δ_4) = 0.276946
p_42 := -Im(y_42)*(δ_4 - δ_2) = -0.276946
# Πρόβλημα εκτίμησης κατάστασης με μετρήσεις SCADA
P_12 := V_1^2*Re(y_s12 + y_12) - V_1*V_2*(Re(y_s12 + y_12)*cos(δ_1 - δ_2) + Im(y_s12 + y_12)*sin(δ_1 - δ_2)) = 0.896894
# αij = g_ij*cos(δ_i - δ_j) + b_ij*sin(δ_i - δ_j)
P_23 := V_2^2*Re(y_s23 + y_23) - V_2*V_3*(Re(y_s23 + y_23)*cos(δ_2 - δ_3) + Im(y_s23 + y_23)*sin(δ_2 - δ_3)) = 0.130586
# βij = g_ij*sin(δ_i - δ_j) - b_ij*cos(δ_i - δ_j)
P_24 := V_2^2*Re(y_s24 + y_24) - V_2*V_4*(Re(y_s24 + y_24)*cos(δ_2 - δ_4) + Im(y_s24 + y_24)*sin(δ_2 - δ_4)) = 0.25
P_42 := V_4^2*Re(y_s42 + y_42) - V_4*V_2*(Re(y_s42 + y_42)*cos(δ_4 - δ_2) + Im(y_s42 + y_42)*sin(δ_4 - δ_2)) = -0.25
Q_21 := -V_2^2*Im(y_s21 + y_21) - V_2*V_1*(Re(y_s21 + y_21)*sin(δ_2 - δ_1) - Im(y_s21 + y_21)*cos(δ_2 - δ_1)) = -0.408682
Q_31 := -V_3^2*Im(y_s31 + y_31) - V_3*V_1*(Re(y_s31 + y_31)*sin(δ_3 - δ_1) - Im(y_s31 + y_31)*cos(δ_3 - δ_1)) = -0.58837
Q_24 := -V_2^2*Im(y_s24 + y_24) - V_2*V_4*(Re(y_s24 + y_24)*sin(δ_2 - δ_4) - Im(y_s24 + y_24)*cos(δ_2 - δ_4)) = 0.106484
# Pi = V_i^2*Σ(g_ij + g_sij) - V_i*Σ(V_j*α_ij)
Q_42 := -V_4^2*Im(y_s42 + y_42) - V_4*V_2*(Re(y_s42 + y_42)*sin(δ_4 - δ_2) - Im(y_s42 + y_42)*cos(δ_4 - δ_2)) = -0.1
# Q.i =-V_i^2*Σ(b_ij + b_sij) - V_i^2*b_i - V_i*Σ(V_j*β_ij)
P_3 := V_3^2*Re(y_s31 + y_31 + y_s32 + y_32) - V_3*(V_1*(Re(y_s12 + y_12)*cos(δ_1 - δ_2) + Im(y_s12 + y_12)*sin(δ_1 - δ_2))) - V_3*(V_2*(Re(y_s32 + y_32)*cos(δ_3 - δ_2) + Im(y_s32 + y_32)*sin(δ_3 - δ_2))) = 0.235283
Q_3 := -V_3^2*Im(y_s31 + y_31 + y_s32 + y_32) - V_3*(V_1*(Re(y_s31 + y_31)*sin(δ_3 - δ_1) - Im(y_s31 + y_31)*cos(δ_3 - δ_1))) - V_3*(V_2*(Re(y_s32 + y_32)*sin(δ_3 - δ_2) - Im(y_s32 + y_32)*cos(δ_3 - δ_2))) = -0.682998
σ1 := 0.010  # μετρήσεις ροών
σ2 := 0.05  # μετρήσεις εγχύσεων
σ3 := 0.005  # μετρήσεις τάσεων
# Για θόρυβο 1.5 σ1, 2 σ2 και 3 σ3 παίρνουμε:
Z := transpose([1.5*σ1 + P_12, 1.5*σ1 + P_23, 1.5*σ1 + P_24, 1.5*σ1 + P_42, 2*σ2 + P_3, 1.5*σ1 + Q_12, 1.5*σ1 + Q_31, 1.5*σ1 + Q_24, 1.5*σ1 + Q_42, 2*σ2 + Q_3, 3*σ3 + V_1, 3*σ3 + V_2])
Z = [0.911894; 0.145586; 0.265; -0.235; 0.335283; -0.085; -0.57337; 0.121484; -0.085; -0.582998; 1.015; 0.969501]
R := [
    σ1^2, 0, 0, 0, 0, 0, 0, 0, 0, 0, 0, 0;
    0, σ1^2, 0, 0, 0, 0, 0, 0, 0, 0, 0, 0;
    0, 0, σ1^2, 0, 0, 0, 0, 0, 0, 0, 0, 0;
    0, 0, 0, σ1^2, 0, 0, 0, 0, 0, 0, 0, 0;
    0, 0, 0, 0, σ2^2, 0, 0, 0, 0, 0, 0, 0;
    0, 0, 0, 0, 0, σ1^2, 0, 0, 0, 0, 0, 0;
    0, 0, 0, 0, 0, 0, σ1^2, 0, 0, 0, 0, 0;
    0, 0, 0, 0, 0, 0, 0, σ1^2, 0, 0, 0, 0;
    0, 0, 0, 0, 0, 0, 0, 0, σ1^2, 0, 0, 0;
    0, 0, 0, 0, 0, 0, 0, 0, 0, σ2^2, 0, 0;
    0, 0, 0, 0, 0, 0, 0, 0, 0, 0, σ3^2, 0;
    0, 0, 0, 0, 0, 0, 0, 0, 0, 0, 0, σ3^2
]
# Αρχικοποίηση του συστήματος για να τρέξουν οι επαναλήψεις
V_1 := 1.00
δ_1 := 0.00 deg
V_2 := 1.00
δ_2 := 0.00 deg
V_3 := 1.00
δ_3 := 0.00 deg
V_4 := 1.00
δ_4 := 0.00 deg
# Θεμελίωση Του Προβλήματος Εκτίμησης Κατάστασης 1^η Επανάληψη
# Vmag 1, 2
# Pflows 1-2, 2-3, 2-4, 4-2
# Qflows 2-1, 3-1, 2-4, 4-2
# Pinj 3, Qinj 3
x_0 := transpose([δ_2, δ_3, δ_4, V_1, V_2, V_3, V_4])
h_P12(x_0) := V_1^2*Re(y_12) - V_1*V_2*(Re(y_12)*cos(δ_1 - δ_2) + Im(y_12)*sin(δ_1 - δ_2))
h_P23(x_0) := V_2^2*Re(y_23) - V_2*V_3*(Re(y_23)*cos(δ_2 - δ_3) + Im(y_23)*sin(δ_2 - δ_3))
h_P24(x_0) := V_2^2*Re(y_24) - V_2*V_4*(Re(y_24)*cos(δ_2 - δ_4) + Im(y_24)*sin(δ_2 - δ_4))
h_P42(x_0) := V_4^2*Re(y_42) - V_4*V_2*(Re(y_42)*cos(δ_4 - δ_2) + Im(y_42)*sin(δ_4 - δ_2))
h_P3(x_0) := V_3^2*G[3, 3] - V_3*V_1*(Re(y_31)*cos(δ_3 - δ_1) + Im(y_31)*sin(δ_3 - δ_1)) - V_3*V_2*(Re(y_32)*cos(δ_3 - δ_2) + Im(y_32)*sin(δ_3 - δ_2))
h_Q21(x_0) := -V_2^2*Im(y_21 + y_s21) - V_2*V_1*(Re(y_21 + y_s21)*sin(δ_2 - δ_1) - Im(y_21 + y_s21)*cos(δ_2 - δ_1))
h_Q31(x_0) := -V_3^2*Im(y_31 + y_s31) - V_3*V_1*(Re(y_31 + y_s31)*sin(δ_3 - δ_1) - Im(y_31 + y_s31)*cos(δ_3 - δ_1))
h_Q24(x_0) := -V_2^2*Im(y_24 + y_s24) - V_2*V_4*(Re(y_24 + y_s24)*sin(δ_2 - δ_4) - Im(y_24 + y_s24)*cos(δ_2 - δ_4))
h_Q42(x_0) := -V_4^2*Im(y_42 + y_s42) - V_4*V_2*(Re(y_42 + y_s42)*sin(δ_4 - δ_2) - Im(y_42 + y_s42)*cos(δ_4 - δ_2))
h_Q3(x_0) := -V_3^2*B[3, 3] - V_3*V_1*(Re(y_31 + y_s31)*sin(δ_3 - δ_1) - Im(y_31 + y_s31)*cos(δ_3 - δ_1)) - V_3*V_2*(Re(y_32 + y_s32)*sin(δ_3 - δ_2) - Im(y_32 + y_s32)*cos(δ_3 - δ_2))
h_V1(x_0) := V_1
h_V2(x_0) := V_2
h(x_0) := transpose([h_P12(x_0), h_P23(x_0), h_P24(x_0), h_P42(x_0), h_P3(x_0), h_Q21(x_0), h_Q31(x_0), h_Q24(x_0), h_Q42(x_0), h_Q3(x_0), h_V1(x_0), h_V2(x_0)])
h(x_0) = [0; 0; 0; 0; 0; 0; 0; 0; 0; 0; 1; 1]
# Ήθελα να το αποφύγω αλλά εν τέλει θα ορίσω τις ποσότητες αij και bij
α_12 := Re(y_s12 + y_12)*cos(δ_1 - δ_2) + Im(y_s12 + y_12)*sin(δ_1 - δ_2) = 5
α_13 := Re(y_s13 + y_13)*cos(δ_1 - δ_3) + Im(y_s13 + y_13)*sin(δ_1 - δ_3) = 5
α_21 := Re(y_s21 + y_21)*cos(δ_2 - δ_1) + Im(y_s21 + y_21)*sin(δ_2 - δ_1) = 5
α_23 := Re(y_s23 + y_23)*cos(δ_2 - δ_3) + Im(y_s23 + y_23)*sin(δ_2 - δ_3) = 4
α_24 := Re(y_s24 + y_24)*cos(δ_2 - δ_4) + Im(y_s24 + y_24)*sin(δ_2 - δ_4) = 0
α_31 := Re(y_s31 + y_31)*cos(δ_3 - δ_1) + Im(y_s31 + y_31)*sin(δ_3 - δ_1) = 5
α_32 := Re(y_s32 + y_32)*cos(δ_3 - δ_2) + Im(y_s32 + y_32)*sin(δ_3 - δ_2) = 4
α_42 := Re(y_s42 + y_42)*cos(δ_4 - δ_2) + Im(y_s42 + y_42)*sin(δ_4 - δ_2) = 0
β_12 := Re(y_12 + y_s12)*sin(δ_1 - δ_2) - Im(y_12 + y_s12)*cos(δ_1 - δ_2) = 14.9
β_13 := Re(y_13 + y_s13)*sin(δ_1 - δ_3) - Im(y_13 + y_s13)*cos(δ_1 - δ_3) = 14.875
β_21 := Re(y_21 + y_s21)*sin(δ_2 - δ_1) - Im(y_21 + y_s21)*cos(δ_2 - δ_1) = 14.9
β_23 := Re(y_23 + y_s23)*sin(δ_2 - δ_3) - Im(y_23 + y_s23)*cos(δ_2 - δ_3) = 8
β_24 := Re(y_24 + y_s24)*sin(δ_2 - δ_4) - Im(y_24 + y_s24)*cos(δ_2 - δ_4) = 12.5
β_32 := Re(y_32 + y_s32)*sin(δ_3 - δ_2) - Im(y_32 + y_s32)*cos(δ_3 - δ_2) = 8
β_31 := Re(y_31 + y_s31)*sin(δ_3 - δ_1) - Im(y_31 + y_s31)*cos(δ_3 - δ_1) = 14.875
β_42 := Re(y_42 + y_s42)*sin(δ_4 - δ_2) - Im(y_42 + y_s42)*cos(δ_4 - δ_2) = 12.5
H(x_0) := [
    -V_1*V_2*β_12, 0, 0, 2*V_1*Re(y_12 + y_s12) - V_2*α_12, -V_1*α_12, 0, 0;
    V_2*V_3*β_23, -V_2*V_3*β_23, 0, 0, 2*V_2*Re(y_23 + y_s23) - V_3*α_23, -V_2*α_23, 0;
    V_2*V_4*β_24, 0, -V_2*V_4*β_24, 0, 2*V_2*Re(y_24 + y_s24) - V_4*α_24, 0, -V_2*α_24;
    -V_4*V_2*β_42, 0, V_4*V_2*β_42, 0, -V_4*α_42, 0, 2*V_4*Re(y_42 + y_s42) - V_2*α_42;
    -V_3*V_2*β_32, V_3*(V_1*β_31 + V_2*β_32), 0, -V_3*α_31, -V_3*α_32, 2*V_3*G[3, 3] - V_1*α_31 - V_2*α_32, 0;
    -V_2*V_1*α_21, 0, 0, -V_2*β_21, 2*V_2*Im(y_21 + y_s21) - V_1*β_21, 0, 0;
    0, -V_3*V_1*α_31, 0, -V_3*β_31, 0, -2*V_3*Im(y_31 + y_s31) - V_1*β_31, 0;
    -V_2*V_4*α_24, 0, V_2*V_4*α_24, 0, -2*V_2*Im(y_24 + y_s24) - V_4*β_24, 0, -V_2*β_24;
    V_4*V_2*α_42, 0, -V_4*V_2*α_42, 0, -V_4*β_42, 0, -2*V_4*Im(y_42 + y_s42) - V_2*β_42;
    V_3*V_2*α_32, -V_3*(V_1*α_31 + V_2*α_32), 0, -V_3*β_31, -V_2*β_32, -2*V_3*B[3, 3] - V_1*β_31 - V_2*β_32, 0;
    0, 0, 0, 1, 0, 0, 0;
    0, 0, 0, 0, 1, 0, 0
]
# Μήτρα Συνδιασποράς Σφάλματος
R = [
    0.0001, 0, 0, 0, 0, 0, 0, 0, 0, 0, 0, 0;
    0, 0.0001, 0, 0, 0, 0, 0, 0, 0, 0, 0, 0;
    0, 0, 0.0001, 0, 0, 0, 0, 0, 0, 0, 0, 0;
    0, 0, 0, 0.0001, 0, 0, 0, 0, 0, 0, 0, 0;
    0, 0, 0, 0, 0.0025, 0, 0, 0, 0, 0, 0, 0;
    0, 0, 0, 0, 0, 0.0001, 0, 0, 0, 0, 0, 0;
    0, 0, 0, 0, 0, 0, 0.0001, 0, 0, 0, 0, 0;
    0, 0, 0, 0, 0, 0, 0, 0.0001, 0, 0, 0, 0;
    0, 0, 0, 0, 0, 0, 0, 0, 0.0001, 0, 0, 0;
    0, 0, 0, 0, 0, 0, 0, 0, 0, 0.0025, 0, 0;
    0, 0, 0, 0, 0, 0, 0, 0, 0, 0, 2.5e-5, 0;
    0, 0, 0, 0, 0, 0, 0, 0, 0, 0, 0, 2.5e-5
]
H(x_0) = [
    -14.9, 0, 0, 5, -5, 0, 0;
    8, -8, 0, 0, 4, -4, 0;
    12.5, 0, -12.5, 0, 0, 0, 0;
    -12.5, 0, 12.5, 0, 0, 0, 0;
    -8, 22.875, 0, -5, -4, 9, 0;
    -5, 0, 0, -14.9, -44.7, 0, 0;
    0, -5, 0, -14.875, 0, 14.875, 0;
    0, 0, 0, 0, 12.5, 0, -12.5;
    0, 0, 0, 0, -12.5, 0, 12.5;
    4, -9, 0, -14.875, -8, 22.875, 0;
    0, 0, 0, 1, 0, 0, 0;
    0, 0, 0, 0, 1, 0, 0
]
# Μήτρα Κέρδους
transpose(H(x_0)) = [
    -14.9, 8, 12.5, -12.5, -8, -5, 0, 0, 0, 4, 0, 0;
    0, -8, 0, 0, 22.875, 0, -5, 0, 0, -9, 0, 0;
    0, 0, -12.5, 12.5, 0, 0, 0, 0, 0, 0, 0, 0;
    5, 0, 0, 0, -5, -14.9, -14.875, 0, 0, -14.875, 1, 0;
    -5, 4, 0, 0, -4, -44.7, 0, 12.5, -12.5, -8, 0, 1;
    0, -4, 0, 0, 9, 0, 14.875, 0, 0, 22.875, 0, 0;
    0, 0, 0, 0, 0, 0, 0, -12.5, 12.5, 0, 0, 0
]
R^-1 = [
    10000, 0, 0, 0, 0, 0, 0, 0, 0, 0, 0, 0;
    0, 10000, 0, 0, 0, 0, 0, 0, 0, 0, 0, 0;
    0, 0, 10000, 0, 0, 0, 0, 0, 0, 0, 0, 0;
    0, 0, 0, 10000, 0, 0, 0, 0, 0, 0, 0, 0;
    0, 0, 0, 0, 400, 0, 0, 0, 0, 0, 0, 0;
    0, 0, 0, 0, 0, 10000, 0, 0, 0, 0, 0, 0;
    0, 0, 0, 0, 0, 0, 10000, 0, 0, 0, 0, 0;
    0, 0, 0, 0, 0, 0, 0, 10000, 0, 0, 0, 0;
    0, 0, 0, 0, 0, 0, 0, 0, 10000, 0, 0, 0;
    0, 0, 0, 0, 0, 0, 0, 0, 0, 400, 0, 0;
    0, 0, 0, 0, 0, 0, 0, 0, 0, 0, 40000, 0;
    0, 0, 0, 0, 0, 0, 0, 0, 0, 0, 0, 40000
]
transpose(H(x_0))*R^-1 = [
    -149000, 80000, 125000, -125000, -3200, -50000, 0, 0, 0, 1600, 0, 0;
    0, -80000, 0, 0, 9150, 0, -50000, 0, 0, -3600, 0, 0;
    0, 0, -125000, 125000, 0, 0, 0, 0, 0, 0, 0, 0;
    50000, 0, 0, 0, -2000, -149000, -148750, 0, 0, -5950, 40000, 0;
    -50000, 40000, 0, 0, -1600, -447000, 0, 125000, -125000, -3200, 0, 40000;
    0, -40000, 0, 0, 3600, 0, 148750, 0, 0, 9150, 0, 0;
    0, 0, 0, 0, 0, 0, 0, -125000, 125000, 0, 0, 0
]
G(x_0) := (transpose(H(x_0))*R^-1)*H(x_0)
G(x_0) = [
    6267100, -727600, -3125000, -7800, 3300000, -312200, 0;
    -727600, 1131706, 0, 751550, -327800, -423750, 0;
    -3125000, 0, 3125000, 0, 0, 0, 0;
    -7800, 751550, 0, 4821263, 6465900, -2366763, 0;
    3300000, -327800, 0, 6465900, 23587900, -247600, -3125000;
    -312200, -423750, 0, -2366763, -247600, 2614363, 0;
    0, 0, 0, 0, -3125000, 0, 3125000
]
# Υπολογισμός υπολοίπου:
Z - h(x_0) = [0.911894; 0.145586; 0.265; -0.235; 0.335283; -0.085; -0.57337; 0.121484; -0.085; -0.582998; 0.015; -0.0304985]
h(x_0) = [0; 0; 0; 0; 0; 0; 0; 0; 0; 0; 1; 1]
Z = [0.911894; 0.145586; 0.265; -0.235; 0.335283; -0.085; -0.57337; 0.121484; -0.085; -0.582998; 1.015; 0.969501]
x_0 = [0; 0; 0; 1; 1; 1; 1]
x_1 := x_0 + (G(x_0)^-1*transpose(H(x_0)))*R^-1*(Z - h(x_0)) = [-0.0504548; -0.0383739; -0.0704548; 1.02249; 0.99999; 0.971688; 0.991731]
Δx_0 := x_1 - x_0 = [-0.0504548; -0.0383739; -0.0704548; 0.0224933; -9.50487e-6; -0.0283123; -0.00826885]
vectorize(|Δx_0|) = [0.0504548; 0.0383739; 0.0704548; 0.0224933; 9.50487e-6; 0.0283123; 0.00826885]
max(vectorize(|Δx_0|)) = 0.0704548
# Θεμελίωση Του Προβλήματος Εκτίμησης Κατάστασης 2^η Επανάληψη
δ_2 := x_1[1, 1]
V_1 := x_1[4, 1]
# Vmag 1, 2
# Pflows 1-2, 2-3, 2-4, 4-2
# Qflows 2-1, 3-1, 2-4, 4-2
# Pinj 3, Qinj 3
δ_3 := x_1[2, 1]
V_2 := x_1[5, 1]
G := Re(Y) = [10, -5, -5, 0; -5, 9, -4, 0; -5, -4, 9, 0; 0, 0, 0, 0]
B := Im(Y) = [-29.775, 15, 15, 0; 15, -35.4, 8, 12.5; 15, 8, -22.875, 0; 0, 12.5, 0, -12.5]
δ_4 := x_1[3, 1]
V_3 := x_1[6, 1]
V_4 := x_1[7, 1]
h_P12(x_1) := V_1^2*Re(y_12) - V_1*V_2*(Re(y_12)*cos(δ_1 - δ_2) + Im(y_12)*sin(δ_1 - δ_2))
h_P23(x_1) := V_2^2*Re(y_23) - V_2*V_3*(Re(y_23)*cos(δ_2 - δ_3) + Im(y_23)*sin(δ_2 - δ_3))
h_P24(x_1) := V_2^2*Re(y_24) - V_2*V_4*(Re(y_24)*cos(δ_2 - δ_4) + Im(y_24)*sin(δ_2 - δ_4))
h_P42(x_1) := V_4^2*Re(y_42) - V_4*V_2*(Re(y_42)*cos(δ_4 - δ_2) + Im(y_42)*sin(δ_4 - δ_2))
h_P3(x_1) := V_3^2*G[3, 3] - V_3*V_1*(Re(y_31)*cos(δ_3 - δ_1) + Im(y_31)*sin(δ_3 - δ_1)) - V_3*V_2*(Re(y_32)*cos(δ_3 - δ_2) + Im(y_32)*sin(δ_3 - δ_2))
h_Q21(x_1) := -V_2^2*Im(y_21 + y_s21) - V_2*V_1*(Re(y_21 + y_s21)*sin(δ_2 - δ_1) - Im(y_21 + y_s21)*cos(δ_2 - δ_1))
h_Q31(x_1) := -V_3^2*Im(y_31 + y_s31) - V_3*V_1*(Re(y_31 + y_s31)*sin(δ_3 - δ_1) - Im(y_31 + y_s31)*cos(δ_3 - δ_1))
h_Q24(x_1) := -V_2^2*Im(y_24 + y_s24) - V_2*V_4*(Re(y_24 + y_s24)*sin(δ_2 - δ_4) - Im(y_24 + y_s24)*cos(δ_2 - δ_4))
h_Q42(x_1) := -V_4^2*Im(y_42 + y_s42) - V_4*V_2*(Re(y_42 + y_s42)*sin(δ_4 - δ_2) - Im(y_42 + y_s42)*cos(δ_4 - δ_2))
h_Q3(x_1) := -V_3^2*B[3, 3] - V_3*V_1*(Re(y_31 + y_s31)*sin(δ_3 - δ_1) - Im(y_31 + y_s31)*cos(δ_3 - δ_1)) - V_3*V_2*(Re(y_32 + y_s32)*sin(δ_3 - δ_2) - Im(y_32 + y_s32)*cos(δ_3 - δ_2))
h_V1(x_1) := V_1
h_V2(x_1) := V_2
h(x_1) := transpose([h_P12(x_1), h_P23(x_1), h_P24(x_1), h_P42(x_1), h_P3(x_1), h_Q21(x_1), h_Q31(x_1), h_Q24(x_1), h_Q42(x_1), h_Q3(x_1), h_V1(x_1), h_V2(x_1)])
H(x_1) := [
    -V_1*V_2*β_12, 0, 0, 2*V_1*Re(y_12 + y_s12) - V_2*α_12, -V_1*α_12, 0, 0;
    V_2*V_3*β_23, -V_2*V_3*β_23, 0, 0, 2*V_2*Re(y_23 + y_s23) - V_3*α_23, -V_2*α_23, 0;
    V_2*V_4*β_24, 0, -V_2*V_4*β_24, 0, 2*V_2*Re(y_24 + y_s24) - V_4*α_24, 0, -V_2*α_24;
    -V_4*V_2*β_42, 0, V_4*V_2*β_42, 0, -V_4*α_42, 0, 2*V_4*Re(y_42 + y_s42) - V_2*α_42;
    -V_3*V_2*β_32, V_3*(V_1*β_31 + V_2*β_32), 0, -V_3*α_31, -V_3*α_32, 2*V_3*G[3, 3] - V_1*α_31 - V_2*α_32, 0;
    -V_2*V_1*α_21, 0, 0, -V_2*β_21, 2*V_2*Im(y_21 + y_s21) - V_1*β_21, 0, 0;
    0, -V_3*V_1*α_31, 0, -V_3*β_31, 0, -2*V_3*Im(y_31 + y_s31) - V_1*β_31, 0;
    -V_2*V_4*α_24, 0, V_2*V_4*α_24, 0, -2*V_2*Im(y_24 + y_s24) - V_4*β_24, 0, -V_2*β_24;
    V_4*V_2*α_42, 0, -V_4*V_2*α_42, 0, -V_4*β_42, 0, -2*V_4*Im(y_42 + y_s42) - V_2*β_42;
    V_3*V_2*α_32, -V_3*(V_1*α_31 + V_2*α_32), 0, -V_3*β_31, -V_2*β_32, -2*V_3*B[3, 3] - V_1*β_31 - V_2*β_32, 0;
    0, 0, 0, 1, 0, 0, 0;
    0, 0, 0, 0, 1, 0, 0
]
# Μήτρα Συνδιασποράς Σφάλματος
R = [
    0.0001, 0, 0, 0, 0, 0, 0, 0, 0, 0, 0, 0;
    0, 0.0001, 0, 0, 0, 0, 0, 0, 0, 0, 0, 0;
    0, 0, 0.0001, 0, 0, 0, 0, 0, 0, 0, 0, 0;
    0, 0, 0, 0.0001, 0, 0, 0, 0, 0, 0, 0, 0;
    0, 0, 0, 0, 0.0025, 0, 0, 0, 0, 0, 0, 0;
    0, 0, 0, 0, 0, 0.0001, 0, 0, 0, 0, 0, 0;
    0, 0, 0, 0, 0, 0, 0.0001, 0, 0, 0, 0, 0;
    0, 0, 0, 0, 0, 0, 0, 0.0001, 0, 0, 0, 0;
    0, 0, 0, 0, 0, 0, 0, 0, 0.0001, 0, 0, 0;
    0, 0, 0, 0, 0, 0, 0, 0, 0, 0.0025, 0, 0;
    0, 0, 0, 0, 0, 0, 0, 0, 0, 0, 2.5e-5, 0;
    0, 0, 0, 0, 0, 0, 0, 0, 0, 0, 0, 2.5e-5
]
H(x_1) = [
    -15.235, 0, 0, 5.22498, -5.11247, 0, 0;
    7.77343, -7.77343, 0, 0, 4.11317, -3.99996, 0;
    12.3965, 0, -12.3965, 0, 0, 0, 0;
    -12.3965, 0, 12.3965, 0, 0, 0, 0;
    -7.77343, 22.5524, 0, -4.85844, -3.88675, 8.37795, 0;
    -5.11242, 0, 0, -14.8999, -45.0349, 0, 0;
    0, -4.96772, 0, -14.4539, 0, 13.6981, 0;
    0, 0, 0, 0, 12.6031, 0, -12.4999;
    0, 0, 0, 0, -12.3966, 0, 12.2934;
    3.88671, -8.85443, 0, -14.4539, -7.99992, 21.2452, 0;
    0, 0, 0, 1, 0, 0, 0;
    0, 0, 0, 0, 1, 0, 0
]
# Μήτρα Κέρδους
transpose(H(x_1)) = [
    -15.235, 7.77343, 12.3965, -12.3965, -7.77343, -5.11242, 0, 0, 0, 3.88671, 0, 0;
    0, -7.77343, 0, 0, 22.5524, 0, -4.96772, 0, 0, -8.85443, 0, 0;
    0, 0, -12.3965, 12.3965, 0, 0, 0, 0, 0, 0, 0, 0;
    5.22498, 0, 0, 0, -4.85844, -14.8999, -14.4539, 0, 0, -14.4539, 1, 0;
    -5.11247, 4.11317, 0, 0, -3.88675, -45.0349, 0, 12.6031, -12.3966, -7.99992, 0, 1;
    0, -3.99996, 0, 0, 8.37795, 0, 13.6981, 0, 0, 21.2452, 0, 0;
    0, 0, 0, 0, 0, 0, 0, -12.4999, 12.2934, 0, 0, 0
]
R^-1 = [
    10000, 0, 0, 0, 0, 0, 0, 0, 0, 0, 0, 0;
    0, 10000, 0, 0, 0, 0, 0, 0, 0, 0, 0, 0;
    0, 0, 10000, 0, 0, 0, 0, 0, 0, 0, 0, 0;
    0, 0, 0, 10000, 0, 0, 0, 0, 0, 0, 0, 0;
    0, 0, 0, 0, 400, 0, 0, 0, 0, 0, 0, 0;
    0, 0, 0, 0, 0, 10000, 0, 0, 0, 0, 0, 0;
    0, 0, 0, 0, 0, 0, 10000, 0, 0, 0, 0, 0;
    0, 0, 0, 0, 0, 0, 0, 10000, 0, 0, 0, 0;
    0, 0, 0, 0, 0, 0, 0, 0, 10000, 0, 0, 0;
    0, 0, 0, 0, 0, 0, 0, 0, 0, 400, 0, 0;
    0, 0, 0, 0, 0, 0, 0, 0, 0, 0, 40000, 0;
    0, 0, 0, 0, 0, 0, 0, 0, 0, 0, 0, 40000
]
transpose(H(x_1))*R^-1 = [
    -152350, 77734.3, 123965, -123965, -3109.37, -51124.2, 0, 0, 0, 1554.69, 0, 0;
    0, -77734.3, 0, 0, 9020.96, 0, -49677.2, 0, 0, -3541.77, 0, 0;
    0, 0, -123965, 123965, 0, 0, 0, 0, 0, 0, 0, 0;
    52249.8, 0, 0, 0, -1943.38, -148999, -144539, 0, 0, -5781.54, 40000, 0;
    -51124.7, 41131.7, 0, 0, -1554.7, -450349, 0, 126031, -123966, -3199.97, 0, 40000;
    0, -39999.6, 0, 0, 3351.18, 0, 136981, 0, 0, 8498.08, 0, 0;
    0, 0, 0, 0, 0, 0, 0, -124999, 122934, 0, 0, 0
]
G(x_1) := (transpose(H(x_1))*R^-1)*H(x_1)
G(x_1) = [
    6290372, -688151, -3073475, -41647.5, 3400638, -303955, 0;
    -688151, 1085849, 0, 725392, -326463, -369219, 0;
    -3073475, 0, 3073475, 0, 0, 0, 0;
    -41647.5, 725392, 0, 4715208, 6496811, -2119018, 0;
    3400638, -326463, 0, 6496811, 23908743, -245535, -3099344;
    -303955, -369219, 0, -2119018, -245535, 2245002, 0;
    0, 0, 0, 0, -3099344, 0, 3073747
]
# Υπολογισμός υπολοίπου:
Z - h(x_1) = [0.0168328; 0.126; 0.0170861; 0.0129139; 1.16603; -0.0269361; -0.0404973; 0.0157636; 0.0149089; 0.216273; -0.00749328; -0.030489]
h(x_1) = [0.895061; 0.0195857; 0.247914; -0.247914; -0.830745; -0.0580639; -0.532873; 0.10572; -0.0999089; -0.799271; 1.02249; 0.99999]
Z = [0.911894; 0.145586; 0.265; -0.235; 0.335283; -0.085; -0.57337; 0.121484; -0.085; -0.582998; 1.015; 0.969501]
x_1 = [-0.0504548; -0.0383739; -0.0704548; 1.02249; 0.99999; 0.971688; 0.991731]
x_2 := x_1 + (G(x_1)^-1*transpose(H(x_1)))*R^-1*(Z - h(x_1)) = [-0.0500274; -0.0354685; -0.0701957; 1.01987; 1.00135; 0.967737; 0.99306]
Δx_1 := x_2 - x_1 = [0.000427376; 0.00290535; 0.000259095; -0.00262551; 0.00136216; -0.00395023; 0.00132873]
vectorize(|Δx_1|) = [0.000427376; 0.00290535; 0.000259095; 0.00262551; 0.00136216; 0.00395023; 0.00132873]
max(vectorize(|Δx_1|)) = 0.00395023
# Θεμελίωση Του Προβλήματος Εκτίμησης Κατάστασης 3^η Επανάληψη
δ_2 := x_2[1, 1]
V_1 := x_2[4, 1]
# Vmag 1, 2
# Pflows 1-2, 2-3, 2-4, 4-2
# Qflows 2-1, 3-1, 2-4, 4-2
# Pinj 3, Qinj 3
δ_3 := x_2[2, 1]
V_2 := x_2[5, 1]
G := Re(Y) = [10, -5, -5, 0; -5, 9, -4, 0; -5, -4, 9, 0; 0, 0, 0, 0]
B := Im(Y) = [-29.775, 15, 15, 0; 15, -35.4, 8, 12.5; 15, 8, -22.875, 0; 0, 12.5, 0, -12.5]
δ_4 := x_2[3, 1]
V_3 := x_2[6, 1]
V_4 := x_2[7, 1]
h_P12(x_2) := V_1^2*Re(y_12) - V_1*V_2*(Re(y_12)*cos(δ_1 - δ_2) + Im(y_12)*sin(δ_1 - δ_2))
h_P23(x_2) := V_2^2*Re(y_23) - V_2*V_3*(Re(y_23)*cos(δ_2 - δ_3) + Im(y_23)*sin(δ_2 - δ_3))
h_P24(x_2) := V_2^2*Re(y_24) - V_2*V_4*(Re(y_24)*cos(δ_2 - δ_4) + Im(y_24)*sin(δ_2 - δ_4))
h_P42(x_2) := V_4^2*Re(y_42) - V_4*V_2*(Re(y_42)*cos(δ_4 - δ_2) + Im(y_42)*sin(δ_4 - δ_2))
h_P3(x_2) := V_3^2*G[3, 3] - V_3*V_1*(Re(y_31)*cos(δ_3 - δ_1) + Im(y_31)*sin(δ_3 - δ_1)) - V_3*V_2*(Re(y_32)*cos(δ_3 - δ_2) + Im(y_32)*sin(δ_3 - δ_2))
h_Q21(x_2) := -V_2^2*Im(y_21 + y_s21) - V_2*V_1*(Re(y_21 + y_s21)*sin(δ_2 - δ_1) - Im(y_21 + y_s21)*cos(δ_2 - δ_1))
h_Q31(x_2) := -V_3^2*Im(y_31 + y_s31) - V_3*V_1*(Re(y_31 + y_s31)*sin(δ_3 - δ_1) - Im(y_31 + y_s31)*cos(δ_3 - δ_1))
h_Q24(x_2) := -V_2^2*Im(y_24 + y_s24) - V_2*V_4*(Re(y_24 + y_s24)*sin(δ_2 - δ_4) - Im(y_24 + y_s24)*cos(δ_2 - δ_4))
h_Q42(x_2) := -V_4^2*Im(y_42 + y_s42) - V_4*V_2*(Re(y_42 + y_s42)*sin(δ_4 - δ_2) - Im(y_42 + y_s42)*cos(δ_4 - δ_2))
h_Q3(x_2) := -V_3^2*B[3, 3] - V_3*V_1*(Re(y_31 + y_s31)*sin(δ_3 - δ_1) - Im(y_31 + y_s31)*cos(δ_3 - δ_1)) - V_3*V_2*(Re(y_32 + y_s32)*sin(δ_3 - δ_2) - Im(y_32 + y_s32)*cos(δ_3 - δ_2))
h_V1(x_2) := V_1
h_V2(x_2) := V_2
h(x_2) := transpose([h_P12(x_2), h_P23(x_2), h_P24(x_2), h_P42(x_2), h_P3(x_2), h_Q21(x_2), h_Q31(x_2), h_Q24(x_2), h_Q42(x_2), h_Q3(x_2), h_V1(x_2), h_V2(x_2)])
H(x_2) := [
    -V_1*V_2*β_12, 0, 0, 2*V_1*Re(y_12 + y_s12) - V_2*α_12, -V_1*α_12, 0, 0;
    V_2*V_3*β_23, -V_2*V_3*β_23, 0, 0, 2*V_2*Re(y_23 + y_s23) - V_3*α_23, -V_2*α_23, 0;
    V_2*V_4*β_24, 0, -V_2*V_4*β_24, 0, 2*V_2*Re(y_24 + y_s24) - V_4*α_24, 0, -V_2*α_24;
    -V_4*V_2*β_42, 0, V_4*V_2*β_42, 0, -V_4*α_42, 0, 2*V_4*Re(y_42 + y_s42) - V_2*α_42;
    -V_3*V_2*β_32, V_3*(V_1*β_31 + V_2*β_32), 0, -V_3*α_31, -V_3*α_32, 2*V_3*G[3, 3] - V_1*α_31 - V_2*α_32, 0;
    -V_2*V_1*α_21, 0, 0, -V_2*β_21, 2*V_2*Im(y_21 + y_s21) - V_1*β_21, 0, 0;
    0, -V_3*V_1*α_31, 0, -V_3*β_31, 0, -2*V_3*Im(y_31 + y_s31) - V_1*β_31, 0;
    -V_2*V_4*α_24, 0, V_2*V_4*α_24, 0, -2*V_2*Im(y_24 + y_s24) - V_4*β_24, 0, -V_2*β_24;
    V_4*V_2*α_42, 0, -V_4*V_2*α_42, 0, -V_4*β_42, 0, -2*V_4*Im(y_42 + y_s42) - V_2*β_42;
    V_3*V_2*α_32, -V_3*(V_1*α_31 + V_2*α_32), 0, -V_3*β_31, -V_2*β_32, -2*V_3*B[3, 3] - V_1*β_31 - V_2*β_32, 0;
    0, 0, 0, 1, 0, 0, 0;
    0, 0, 0, 0, 1, 0, 0
]
# Μήτρα Συνδιασποράς Σφάλματος
R = [
    0.0001, 0, 0, 0, 0, 0, 0, 0, 0, 0, 0, 0;
    0, 0.0001, 0, 0, 0, 0, 0, 0, 0, 0, 0, 0;
    0, 0, 0.0001, 0, 0, 0, 0, 0, 0, 0, 0, 0;
    0, 0, 0, 0.0001, 0, 0, 0, 0, 0, 0, 0, 0;
    0, 0, 0, 0, 0.0025, 0, 0, 0, 0, 0, 0, 0;
    0, 0, 0, 0, 0, 0.0001, 0, 0, 0, 0, 0, 0;
    0, 0, 0, 0, 0, 0, 0.0001, 0, 0, 0, 0, 0;
    0, 0, 0, 0, 0, 0, 0, 0.0001, 0, 0, 0, 0;
    0, 0, 0, 0, 0, 0, 0, 0, 0.0001, 0, 0, 0;
    0, 0, 0, 0, 0, 0, 0, 0, 0, 0.0025, 0, 0;
    0, 0, 0, 0, 0, 0, 0, 0, 0, 0, 2.5e-5, 0;
    0, 0, 0, 0, 0, 0, 0, 0, 0, 0, 0, 2.5e-5
]
H(x_2) = [
    -15.2166, 0, 0, 5.19191, -5.09934, 0, 0;
    7.75237, -7.75237, 0, 0, 4.13987, -4.00541, 0;
    12.43, 0, -12.43, 0, 0, 0, 0;
    -12.43, 0, 12.43, 0, 0, 0, 0;
    -7.75237, 22.4335, 0, -4.83869, -3.87095, 8.31452, 0;
    -5.10624, 0, 0, -14.9202, -45.0363, 0, 0;
    0, -4.93482, 0, -14.3951, 0, 13.6197, 0;
    0, 0, 0, 0, 12.6206, 0, -12.5169;
    0, 0, 0, 0, -12.4132, 0, 12.3096;
    3.87619, -8.81101, 0, -14.3951, -8.01082, 21.0926, 0;
    0, 0, 0, 1, 0, 0, 0;
    0, 0, 0, 0, 1, 0, 0
]
# Μήτρα Κέρδους
transpose(H(x_2)) = [
    -15.2166, 7.75237, 12.43, -12.43, -7.75237, -5.10624, 0, 0, 0, 3.87619, 0, 0;
    0, -7.75237, 0, 0, 22.4335, 0, -4.93482, 0, 0, -8.81101, 0, 0;
    0, 0, -12.43, 12.43, 0, 0, 0, 0, 0, 0, 0, 0;
    5.19191, 0, 0, 0, -4.83869, -14.9202, -14.3951, 0, 0, -14.3951, 1, 0;
    -5.09934, 4.13987, 0, 0, -3.87095, -45.0363, 0, 12.6206, -12.4132, -8.01082, 0, 1;
    0, -4.00541, 0, 0, 8.31452, 0, 13.6197, 0, 0, 21.0926, 0, 0;
    0, 0, 0, 0, 0, 0, 0, -12.5169, 12.3096, 0, 0, 0
]
R^-1 = [
    10000, 0, 0, 0, 0, 0, 0, 0, 0, 0, 0, 0;
    0, 10000, 0, 0, 0, 0, 0, 0, 0, 0, 0, 0;
    0, 0, 10000, 0, 0, 0, 0, 0, 0, 0, 0, 0;
    0, 0, 0, 10000, 0, 0, 0, 0, 0, 0, 0, 0;
    0, 0, 0, 0, 400, 0, 0, 0, 0, 0, 0, 0;
    0, 0, 0, 0, 0, 10000, 0, 0, 0, 0, 0, 0;
    0, 0, 0, 0, 0, 0, 10000, 0, 0, 0, 0, 0;
    0, 0, 0, 0, 0, 0, 0, 10000, 0, 0, 0, 0;
    0, 0, 0, 0, 0, 0, 0, 0, 10000, 0, 0, 0;
    0, 0, 0, 0, 0, 0, 0, 0, 0, 400, 0, 0;
    0, 0, 0, 0, 0, 0, 0, 0, 0, 0, 40000, 0;
    0, 0, 0, 0, 0, 0, 0, 0, 0, 0, 0, 40000
]
transpose(H(x_2))*R^-1 = [
    -152166, 77523.7, 124300, -124300, -3100.95, -51062.4, 0, 0, 0, 1550.47, 0, 0;
    0, -77523.7, 0, 0, 8973.39, 0, -49348.2, 0, 0, -3524.4, 0, 0;
    0, 0, -124300, 124300, 0, 0, 0, 0, 0, 0, 0, 0;
    51919.1, 0, 0, 0, -1935.47, -149202, -143951, 0, 0, -5758.04, 40000, 0;
    -50993.4, 41398.7, 0, 0, -1548.38, -450363, 0, 126206, -124132, -3204.33, 0, 40000;
    0, -40054.1, 0, 0, 3325.81, 0, 136197, 0, 0, 8437.05, 0, 0;
    0, 0, 0, 0, 0, 0, 0, -125169, 123096, 0, 0, 0
]
G(x_2) := (transpose(H(x_2))*R^-1)*H(x_2)
G(x_2) = [
    6297341, -684219, -3090118, -35488.4, 3396128, -303594, 0;
    -684219, 1076875, 0, 717687, -327440, -361321, 0;
    -3090118, 0, 3090118, 0, 0, 0, 0;
    -35488.4, 717687, 0, 4700110, 6508357, -2098107, 0;
    3396128, -327440, 0, 6508357, 23919474, -246281, -3107725;
    -303594, -361321, 0, -2098107, -246281, 2220996, 0;
    0, 0, 0, 0, -3107725, 0, 3081990
]
# Υπολογισμός υπολοίπου:
Z - h(x_2) = [0.045054; 0.123395; 0.0143245; 0.0156755; 1.12625; -0.0831348; -0.00717678; 0.0151558; 0.0154123; 0.29905; -0.00486777; -0.0318512]
h(x_2) = [0.86684; 0.0221913; 0.250676; -0.250676; -0.790971; -0.0018652; -0.566193; 0.106328; -0.100412; -0.882048; 1.01987; 1.00135]
Z = [0.911894; 0.145586; 0.265; -0.235; 0.335283; -0.085; -0.57337; 0.121484; -0.085; -0.582998; 1.015; 0.969501]
x_2 = [-0.0500274; -0.0354685; -0.0701957; 1.01987; 1.00135; 0.967737; 0.99306]
x_3 := x_2 + (G(x_2)^-1*transpose(H(x_2)))*R^-1*(Z - h(x_2)) = [-0.0505419; -0.035482; -0.0706558; 1.02029; 1.00306; 0.968412; 0.994778]
Δx_2 := x_3 - x_2 = [-0.000514437; -1.34813e-5; -0.000460091; 0.000424682; 0.00170406; 0.00067472; 0.00171834]
vectorize(|Δx_2|) = [0.000514437; 1.34813e-5; 0.000460091; 0.000424682; 0.00170406; 0.00067472; 0.00171834]
max(vectorize(|Δx_2|)) = 0.00171834
δ_2 := x_3[1, 1] = -2.89584 deg
V_1 := x_3[4, 1] = 1.02029
δ_3 := x_3[2, 1] = -2.03297 deg
V_2 := x_3[5, 1] = 1.00306
δ_4 := x_3[3, 1] = -4.04828 deg
V_3 := x_3[6, 1] = 0.968412
V_4 := x_3[7, 1] = 0.994778
# Εάν Κάποια Μέτρηση Έχει Μεγάλο Σφάλμα Ποιες Θα Είναι Οι Συνέπειες
# Έστω ότι η 1^η μέτρηση έχει σφάλμα +20σ
Z := transpose([20*σ1 + P_12, 1.5*σ1 + P_23, 1.5*σ1 + P_24, 1.5*σ1 + P_42, 2*σ2 + P_3, 1.5*σ1 + Q_12, 1.5*σ1 + Q_31, 1.5*σ1 + Q_24, 1.5*σ1 + Q_42, 2*σ2 + Q_3, 3*σ3 + V_1, 3*σ3 + V_2])
Z = [1.09689; 0.145586; 0.265; -0.235; 0.335283; -0.085; -0.57337; 0.121484; -0.085; -0.582998; 1.03529; 1.01806]
h(x_2) = [0.86684; 0.0221913; 0.250676; -0.250676; -0.790971; -0.0018652; -0.566193; 0.106328; -0.100412; -0.882048; 1.01987; 1.00135]
r := Z - h(x_2) = [0.230054; 0.123395; 0.0143245; 0.0156755; 1.12625; -0.0831348; -0.00717678; 0.0151558; 0.0154123; 0.29905; 0.0154247; 0.0167041]
# Η Αντικειμενική Συνάρτηση Έχει Τιμή:
J1 := (r[1, 1]^2 + r[2, 1]^2 + r[3, 1]^2 + r[4, 1]^2 + r[6, 1]^2 + r[7, 1]^2 + r[8, 1]^2 + r[9, 1]^2)/σ1^2 = 760.321
J2 := (r[5, 1]^2 + r[10, 1]^2)/σ2^2 = 543.152
J3 := (r[11, 1]^2 + r[12, 1]^2)/σ3^2 = 20.6779
I := [
    1, 0, 0, 0, 0, 0, 0, 0, 0, 0, 0, 0;
    0, 1, 0, 0, 0, 0, 0, 0, 0, 0, 0, 0;
    0, 0, 1, 0, 0, 0, 0, 0, 0, 0, 0, 0;
    0, 0, 0, 1, 0, 0, 0, 0, 0, 0, 0, 0;
    0, 0, 0, 0, 1, 0, 0, 0, 0, 0, 0, 0;
    0, 0, 0, 0, 0, 1, 0, 0, 0, 0, 0, 0;
    0, 0, 0, 0, 0, 0, 1, 0, 0, 0, 0, 0;
    0, 0, 0, 0, 0, 0, 0, 1, 0, 0, 0, 0;
    0, 0, 0, 0, 0, 0, 0, 0, 1, 0, 0, 0;
    0, 0, 0, 0, 0, 0, 0, 0, 0, 1, 0, 0;
    0, 0, 0, 0, 0, 0, 0, 0, 0, 0, 1, 0;
    0, 0, 0, 0, 0, 0, 0, 0, 0, 0, 0, 1
]
Jx := J1 + J2 + J3 = 1324.15
# Mήτρα συνδιασποράς υπολοίπων:
Σ_r := (I - H(x_2)*(transpose(H(x_2))*R^-1*H(x_2))^-1*transpose(H(x_2))*R^-1)*R
Σ_r = [
    2.5826e-6, 7.25433e-6, 0, 0, 6.65939e-5, -6.6809e-8, -8.38936e-7, 5.57198e-10, 5.66582e-10, 2.17312e-5, -2.70005e-7, -6.49153e-7;
    7.25433e-6, 2.15048e-5, 0, 0, 0.000195968, 1.32272e-7, -5.05699e-7, 1.10683e-9, 1.12548e-9, 3.30061e-5, 3.49108e-6, -1.2895e-6;
    0, 0, 5e-5, 5e-5, 0, 0, 0, 0, 0, 0, 0, 0;
    0, 0, 5e-5, 5e-5, 0, 0, 0, 0, 0, 0, 0, 0;
    6.65939e-5, 0.000195968, 0, 0, 0.00178789, 9.96168e-7, -7.44652e-6, 8.41259e-9, 8.55428e-9, 0.000345779, 2.67655e-5, -9.80094e-6;
    -6.6809e-8, 1.32272e-7, 0, 0, 9.96168e-7, 2.07249e-7, 2.84206e-7, -1.54609e-9, -1.57213e-9, -4.35257e-6, 1.3042e-6, 1.80125e-6;
    -8.38936e-7, -5.05699e-7, 0, 0, -7.44652e-6, 2.84206e-7, 3.90996e-6, 2.27278e-9, 2.31106e-9, -6.25827e-5, 6.85095e-6, -2.64786e-6;
    5.57198e-10, 1.10683e-9, 0, 0, 8.41259e-9, -1.54609e-9, 2.27278e-9, 4.9165e-5, 4.9993e-5, -3.47503e-8, -2.90627e-9, 1.15772e-9;
    5.66582e-10, 1.12548e-9, 0, 0, 8.55428e-9, -1.57213e-9, 2.31106e-9, 4.9993e-5, 5.0835e-5, -3.53356e-8, -2.95522e-9, 1.17722e-9;
    2.17312e-5, 3.30061e-5, 0, 0, 0.000345779, -4.35257e-6, -6.25827e-5, -3.47503e-8, -3.53356e-8, 0.00103064, -0.00010457, 4.04852e-5;
    -2.70005e-7, 3.49108e-6, 0, 0, 2.67655e-5, 1.3042e-6, 6.85095e-6, -2.90627e-9, -2.95522e-9, -0.00010457, 1.61124e-5, 3.3859e-6;
    -6.49153e-7, -1.2895e-6, 0, 0, -9.80094e-6, 1.80125e-6, -2.64786e-6, 1.15772e-9, 1.17722e-9, 4.04852e-5, 3.3859e-6, 2.36512e-5
]
r_N1 := r[1, 1]/sqrt(Σ_r[1, 1]) = 143.153
r_N2 := r[2, 1]/sqrt(Σ_r[2, 2]) = 26.609  # Οι μαρκαρισμένες τιμές είναι και οι λανθασμένες
r_N3 := r[3, 1]/sqrt(Σ_r[3, 3]) = 2.02579
r_N4 := r[4, 1]/sqrt(Σ_r[4, 4]) = 2.21685
diag(Σ_r) = [2.5826e-6; 2.15048e-5; 5e-5; 5e-5; 0.00178789; 2.07249e-7; 3.90996e-6; 4.9165e-5; 5.0835e-5; 0.00103064; 1.61124e-5; 2.36512e-5]
r_N5 := r[5, 1]/sqrt(Σ_r[5, 5]) = 26.6358
r_N6 := r[6, 1]/sqrt(Σ_r[6, 6]) = -182.615
r_N7 := r[7, 1]/sqrt(Σ_r[7, 7]) = -3.62947
r_N8 := r[8, 1]/sqrt(Σ_r[8, 8]) = 2.16148
r_N9 := r[9, 1]/sqrt(Σ_r[9, 9]) = 2.16166
r_N10 := r[10, 1]/sqrt(Σ_r[10, 10]) = 9.31516
r_N11 := r[11, 1]/sqrt(Σ_r[11, 11]) = 3.8427
r_N12 := r[12, 1]/sqrt(Σ_r[12, 12]) = 3.43475
# DC Εκτίμηση Κατάστασης
V_1 := 1
V_2 := 1
V_3 := 1
V_4 := 1
x := transpose([δ_2, δ_3, δ_4]) = [-0.0505419; -0.035482; -0.0706558]
Z := transpose([1.5*σ1 + P_12, 1.5*σ1 + P_23, 1.5*σ1 + P_24, 1.5*σ1 + P_42, 2*σ2 + P_3]) = [0.911894; 0.145586; 0.265; -0.235; 0.335283]
P_12 := Z[1, 1] = 0.911894
P_23 := Z[2, 1] = 0.145586
P_24 := Z[3, 1] = 0.265
P_42 := Z[4, 1] = -0.235
P_1 := Z[5, 1] = 0.335283
H := [C_21, 0, 0; -C_23, C_23, 0; -C_24, 0, C_24; C_42, 0, -C_42; C_32, -C_31 - C_32, 0] = [
    -14.3175, 0, 0;
    7.15861, -7.15861, 0;
    11.2847, 0, -11.2847;
    -11.2847, 0, 11.2847;
    -7.15861, 21.2208, 0
]
transpose(H) = [
    -14.3175, 7.15861, 11.2847, -11.2847, -7.15861;
    0, -7.15861, 0, 0, 21.2208;
    0, 0, -11.2847, 11.2847, 0
]
R := [σ1^2, 0, 0, 0, 0; 0, σ1^2, 0, 0, 0; 0, 0, σ1^2, 0, 0; 0, 0, 0, σ1^2, 0; 0, 0, 0, 0, σ2^2]
R^-1 = [10000, 0, 0, 0, 0; 0, 10000, 0, 0, 0; 0, 0, 10000, 0, 0; 0, 0, 0, 10000, 0; 0, 0, 0, 0, 400]
G := transpose(H)*R^-1*H = [5129759, -573222, -2546889; -573222, 692587, 0; -2546889, 0, 2546889]
G^-1 = [
    4.74284e-7, 3.92543e-7, 4.74284e-7;
    3.92543e-7, 1.76875e-6, 3.92543e-7;
    4.74284e-7, 3.92543e-7, 8.6692e-7
]
G^-1*transpose(H) = [
    -6.79057e-6, 5.85153e-7, 0, 0, 4.93487e-6;
    -5.62024e-6, -9.85175e-6, 0, 0, 3.47243e-5;
    -6.79057e-6, 5.85153e-7, -4.43078e-6, 4.43078e-6, 4.93487e-6
]
A := G^-1*transpose(H) = [
    -6.79057e-6, 5.85153e-7, 0, 0, 4.93487e-6;
    -5.62024e-6, -9.85175e-6, 0, 0, 3.47243e-5;
    -6.79057e-6, 5.85153e-7, -4.43078e-6, 4.43078e-6, 4.93487e-6
]
B := A*R^-1 = [
    -0.0679057, 0.00585153, 0, 0, 0.00197395;
    -0.0562024, -0.0985175, 0, 0, 0.0138897;
    -0.0679057, 0.00585153, -0.0443078, 0.0443078, 0.00197395
]
x := B*Z = [-0.0604091; -0.0609364; -0.082563]
δ_2 := x[1, 1] = -0.0604091 rad
δ_3 := x[2, 1] = -0.0609364 rad
δ_4 := x[3, 1] = -0.082563 rad
δ_2 := x[1, 1] = -3.46118 deg
δ_3 := x[2, 1] = -3.4914 deg
δ_4 := x[3, 1] = -4.73051 deg
# Εκτίμηση Κατάστασης Με Μετρήσεις PMU
# Vphasors 2, 3
# Iphasors 2-3, 2-4, 3-1, 1-2
σ := 0.001
# Αρχικοποίηση του Συστήματος με βάση τις τιμές που βρέθηκαν στην AC ροή φορτίου
V_1 = 1
V_2 := 0.9545
V_3 := 0.9375
V_4 := 0.9458
δ_1 := 0*deg
δ_2 := -2.6768*deg
δ_3 := -3.2006*deg
δ_4 := -3.9462*deg
E_1 := V_1*cos(δ_1) = 1  # Vi = Ei + jFi
F_1 := V_1*sin(δ_1) = 0
E_2 := V_2*cos(δ_2) = 0.953459
F_2 := V_2*sin(δ_2) = -0.044577
E_3 := V_3*cos(δ_3) = 0.936038
F_3 := V_3*sin(δ_3) = -0.0523425
E_4 := V_4*cos(δ_4) = 0.943558
F_4 := V_4*sin(δ_4) = -0.0650897
I_23r := Re(y_23 + y_s23)*E_2 - Im(y_23 + y_s23)*F_2 - Re(y_23)*E_3 + Im(y_23)*F_3 = 0.131807
I_23i := Re(y_23 + y_s23)*F_2 + Im(y_23 + y_s23)*E_2 - Re(y_23)*F_3 - Im(y_23)*E_3 = -0.108305
I_24r := Re(y_24 + y_s24)*E_2 - Im(y_24 + y_s24)*F_2 - Re(y_24)*E_4 + Im(y_24)*F_4 = 0.256408
I_24i := Re(y_24 + y_s24)*F_2 + Im(y_24 + y_s24)*E_2 - Re(y_24)*F_4 - Im(y_24)*E_4 = -0.123761
I_31r := Re(y_31 + y_s31)*E_3 - Im(y_31 + y_s31)*F_3 - Re(y_31)*E_1 + Im(y_31)*F_1 = -1.09841
I_31i := Re(y_31 + y_s31)*F_3 + Im(y_31 + y_s31)*E_3 - Re(y_31)*F_1 - Im(y_31)*E_1 = 0.814727
I_12r := Re(y_12 + y_s12)*E_1 - Im(y_12 + y_s12)*F_1 - Re(y_12)*E_2 + Im(y_12)*F_2 = 0.901363
I_12i := Re(y_12 + y_s12)*F_1 + Im(y_12 + y_s12)*E_1 - Re(y_12)*F_2 - Im(y_12)*E_2 = -0.375237
# Διάνυσμα Μετρήσεων
Z := transpose([E_2, F_2, E_3, F_3, I_23r, I_24r, I_31r, I_12r, I_23i, I_24i, I_31i, I_12i])
# Διάνυσμα κατάστασης:
x := transpose([E_1, E_2, E_3, E_4, F_1, F_2, F_3, F_4])
# Διάνυσμα γραμμικών συναρτήσεων για την συσχέτιση των μετρήσεων και του διανύσματος κατάστασης χ:
transpose([E_2(x), F_2(x), E_3(x), F_3(x), I_23r(x), I_24r(x), I_31r(x), I_12r(x), I_23i(x), I_24i(x), I_31i(x), I_12i(x)])
E_1(x) := E_1
E_2(x) := E_2
E_3(x) := E_3
E_4(x) := E_4
F_1(x) := F_1
F_2(x) := F_2
F_3(x) := F_3
F_4(x) := F_4
# Ιακωβιανή Μήτρα
H := [
    0, 1, 0, 0, 0, 0, 0, 0;
    0, 0, 0, 0, 0, 1, 0, 0;
    0, 0, 1, 0, 0, 0, 0, 0;
    0, 0, 0, 0, 0, 0, 1, 0;
    0, Re(y_s23 + y_23), -Re(y_23), 0, 0, -Im(y_s23 + y_23), Im(y_23), 0;
    0, Re(y_s24 + y_24), 0, -Re(y_24), 0, -Im(y_s24 + y_24), 0, Im(y_24);
    -Re(y_31), 0, Re(y_s31 + y_31), 0, Im(y_31), 0, -Im(y_s31 + y_31), 0;
    Re(y_s12 + y_12), -Re(y_21), 0, 0, -Im(y_s12 + y_12), Im(y_12), 0, 0;
    0, Im(y_s23 + y_23), -Im(y_23), 0, 0, Re(y_s23 + y_23), -Re(y_23), 0;
    0, Im(y_s24 + y_24), 0, -Im(y_24), 0, Re(y_s24 + y_24), 0, -Re(y_24);
    -Im(y_31), 0, Im(y_s31 + y_31), 0, -Re(y_31), 0, Re(y_s31 + y_31), 0;
    Im(y_s12 + y_12), -Im(y_21), 0, 0, Re(y_s12 + y_12), -Re(y_12), 0, 0
]
transpose(H) = [
    0, 0, 0, 0, 0, 0, -5, 5, 0, 0, 15, -14.9;
    1, 0, 0, 0, 4, 0, 0, -5, -8, -12.5, 0, 15;
    0, 0, 1, 0, -4, 0, 5, 0, 8, 0, -14.875, 0;
    0, 0, 0, 0, 0, 0, 0, 0, 0, 12.5, 0, 0;
    0, 0, 0, 0, 0, 0, -15, 14.9, 0, 0, -5, 5;
    0, 1, 0, 0, 8, 12.5, 0, -15, 4, 0, 0, -5;
    0, 0, 0, 1, -8, 0, 14.875, 0, -4, 0, 5, 0;
    0, 0, 0, 0, 0, -12.5, 0, 0, 0, 0, 0, 0
]
Z = [0.953459; -0.044577; 0.936038; -0.0523425; 0.131807; 0.256408; -1.09841; 0.901363; -0.108305; -0.123761; 0.814727; -0.375237]
R := [
    σ^2, 0, 0, 0, 0, 0, 0, 0, 0, 0, 0, 0;
    0, σ^2, 0, 0, 0, 0, 0, 0, 0, 0, 0, 0;
    0, 0, σ^2, 0, 0, 0, 0, 0, 0, 0, 0, 0;
    0, 0, 0, σ^2, 0, 0, 0, 0, 0, 0, 0, 0;
    0, 0, 0, 0, σ^2, 0, 0, 0, 0, 0, 0, 0;
    0, 0, 0, 0, 0, σ^2, 0, 0, 0, 0, 0, 0;
    0, 0, 0, 0, 0, 0, σ^2, 0, 0, 0, 0, 0;
    0, 0, 0, 0, 0, 0, 0, σ^2, 0, 0, 0, 0;
    0, 0, 0, 0, 0, 0, 0, 0, σ^2, 0, 0, 0;
    0, 0, 0, 0, 0, 0, 0, 0, 0, σ^2, 0, 0;
    0, 0, 0, 0, 0, 0, 0, 0, 0, 0, σ^2, 0;
    0, 0, 0, 0, 0, 0, 0, 0, 0, 0, 0, σ^2
]
G := (transpose(H)*R^-1)*H = [
    497010000, -248500000, -248125000, 0, 0, -500000, 625000, 0;
    -248500000, 487250000, -80000000, -156250000, 500000, 0, 0, 0;
    -248125000, -80000000, 327265625, 0, -625000, 0, 0, 0;
    0, -156250000, 0, 156250000, 0, 0, 0, 0;
    0, 500000, -625000, 0, 497010000, -248500000, -248125000, 0;
    -500000, 0, 0, 0, -248500000, 487250000, -80000000, -156250000;
    625000, 0, 0, 0, -248125000, -80000000, 327265625, 0;
    0, 0, 0, 0, 0, -156250000, 0, 156250000
]
E_1 := x[1, 1] = 1
F_1 := x[5, 1] = 0 rad
E_2 := x[2, 1] = 0.953459
F_2 := x[6, 1] = -0.044577 rad
E_3 := x[3, 1] = 0.936038
F_3 := x[7, 1] = -0.0523425 rad
x := G^-1*(transpose(H)*R^-1)*Z = [1; 0.953459; 0.936038; 0.943558; 0; -0.044577; -0.0523425; -0.0650897]
E_4 := x[4, 1] = 0.943558
F_4 := x[8, 1] = -0.0650897 rad
δ_1 := atan(0) = 0 rad
δ_1 := atan(0) = 0 deg
V_1 := sqrt(E_1^2 + F_1^2) = 1
V_2 := sqrt(E_2^2 + F_2^2) = 0.9545
δ_2 := atan(F_2/E_2) = -0.046719 rad
δ_2 := atan(F_2/E_2) = -2.6768 deg
V_3 := sqrt(E_3^2 + F_3^2) = 0.9375
δ_3 := atan(F_3/E_3) = -0.055861 rad
δ_3 := atan(F_3/E_3) = -3.2006 deg
V_4 := sqrt(E_4^2 + F_4^2) = 0.9458
δ_4 := atan(F_4/E_4) = -0.0688742 rad
δ_4 := atan(F_4/E_4) = -3.9462 deg
# Τεχνικές Αραιών Μητρών
# LU Τριγωνοποίηση
G(x_0) := [
    6.267*10^6, -7.276*10^5, -3.125*10^6, -7.8*10^3, 3.3*10^6, -3.122*10^5, 0;
    -7.276*10^5, 1.132*10^6, 0, 7.516*10^5, -3.278*10^5, -4.238*10^5, 0;
    -3.125*10^6, 0, 3.125*10^6, 0, 0, 0, 0;
    -7.8*10^3, 7.516*10^5, 0, 4.821*10^6, 6.466*10^6, -2.367*10^6, 0;
    3.3*10^6, -3.278*10^5, 0, 6.466*10^6, 2.359*10^7, -2.476*10^5, -3.125*10^6;
    -3.122*10^5, -4.238*10^5, 0, -2.367*10^6, -2.476*10^5, 2.614*10^6, 0;
    0, 0, 0, 0, -3.125*10^6, 0, 3.125*10^6
]
A := G(x_0)
M := lu(A) = [
    0, 0, 1, 0, 0, 0, 0, 1, 0, 0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;
    0, 1, 0, 0, 0, 0, 0, 0.232832, 1, 0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;
    1, 0, 0, 0, 0, 0, 0, -2.00544, -0.642756, 1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;
    0, 0, 0, 0, 0, 1, 0, 0.099904, -0.374382, -0.218597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;
    0, 0, 0, 1, 0, 0, 0, 0.002496, 0.663958, 0.177725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;
    0, 0, 0, 0, 0, 0, 1, 0, 0, 0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;
    0, 0, 0, 0, 1, 0, 0, -1.056, -0.289576, 1.15517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]
P := submatrix(M, 1, rows(M), 1, rows(M)) = [
    0, 0, 1, 0, 0, 0, 0;
    0, 1, 0, 0, 0, 0, 0;
    1, 0, 0, 0, 0, 0, 0;
    0, 0, 0, 0, 0, 1, 0;
    0, 0, 0, 1, 0, 0, 0;
    0, 0, 0, 0, 0, 0, 1;
    0, 0, 0, 0, 1, 0, 0
]
L := submatrix(M, 1, rows(M), rows(M) + 1, 2*rows(M)) = [
    1, 0, 0, 0, 0, 0, 0;
    0.232832, 1, 0, 0, 0, 0, 0;
    -2.00544, -0.642756, 1, 0, 0, 0, 0;
    0.099904, -0.374382, -0.218597, 1, 0, 0, 0;
    0.002496, 0.663958, 0.177725, -2.1383, 1, 0, 0;
    0, 0, 0, 0, -0.460456, 1, 0;
    -1.056, -0.289576, 1.15517, -3.0956, 3.07518, -1.23323, 1
]
U := submatrix(M, 1, rows(M), 2*rows(M) + 1, 3*rows(M)) = [
    -3125000, 0, 3125000, 0, 0, 0, 0;
    0, 1132000, -727600, 751600, -327800, -423800, 0;
    0, 0, 2674331, 475296, 3089305, -584600, 0;
    0, 0, 0, -1981717, 304990, 2327545, 0;
    0, 0, 0, 0, 6786757, 2995265, 0;
    0, 0, 0, 0, 0, 1379186, 3125000;
    0, 0, 0, 0, 0, 0, 728855
]
L*U = [
    -3125000, 0, 3125000, 0, 0, 0, 0;
    -727600, 1132000, 0, 751600, -327800, -423800, 0;
    6267000, -727600, -3125000, -7800, 3300000, -312200, 0;
    -312200, -423800, 0, -2367000, -247600, 2614000, 0;
    -7800, 751600, 0, 4821000, 6466000, -2367000, 0;
    0, 0, 0, 0, -3125000, 0, 3125000;
    3300000, -327800, 0, 6466000, 23590000, -247600, -3125000
]
b := [1; 2; 3; 4; 5; 6; 7]
x := A^-1*b = [2.8833e-5; -3.52204e-6; 2.9793e-5; 5.76048e-5; -2.1651e-5; 5.52788e-5; -1.9411e-5]
y := L^-1*b = [1; 1.76717; 6.1413; 5.90416; 15.3576; 13.0715; -11.3568]
x := U^-1*y = [2.36434e-5; -2.49476e-6; 2.39634e-5; 4.69252e-5; -1.75016e-5; 4.4783e-5; -1.55816e-5]
diag(U) = [-3125000; 1132000; 2674331; -1981717; 6786757; 1379186; 728855]
D := diag(diag(U)) = [
    -3125000, 0, 0, 0, 0, 0, 0;
    0, 1132000, 0, 0, 0, 0, 0;
    0, 0, 2674331, 0, 0, 0, 0;
    0, 0, 0, -1981717, 0, 0, 0;
    0, 0, 0, 0, 6786757, 0, 0;
    0, 0, 0, 0, 0, 1379186, 0;
    0, 0, 0, 0, 0, 0, 728855
]
L*U := L_1*U_1  # error: A name is required here.
L_1*U_1 := (L*D)*(D^-1*U)  # error: A name is required here.
L_1 := L*D = [
    -3125000, 0, 0, 0, 0, 0, 0;
    -727600, 1132000, 0, 0, 0, 0, 0;
    6267000, -727600, 2674331, 0, 0, 0, 0;
    -312200, -423800, -584600, -1981717, 0, 0, 0;
    -7800, 751600, 475296, 4237498, 6786757, 0, 0;
    0, 0, 0, 0, -3125000, 1379186, 0;
    3300000, -327800, 3089305, 6134598, 20870533, -1700859, 728855
]
U_1 := D^-1*U = [
    1, 0, -1, 0, 0, 0, 0;
    0, 1, -0.642756, 0.663958, -0.289576, -0.374382, 0;
    0, 0, 1, 0.177725, 1.15517, -0.218597, 0;
    0, 0, 0, 1, -0.153902, -1.17451, 0;
    0, 0, 0, 0, 1, 0.44134, 0;
    0, 0, 0, 0, 0, 1, 2.26583;
    0, 0, 0, 0, 0, 0, 1
]
# Cholensky
A^-1 = [
    2.3862e-6, -2.60625e-7, 2.3862e-6, 4.14812e-6, -1.65308e-6, 3.84231e-6, -1.65308e-6;
    -2.60625e-7, 1.34794e-6, -2.60625e-7, -1.27408e-6, 4.54998e-7, -9.23181e-7, 4.54998e-7;
    2.3862e-6, -2.60625e-7, 2.7062e-6, 4.14812e-6, -1.65308e-6, 3.84231e-6, -1.65308e-6;
    4.14812e-6, -1.27408e-6, 4.14812e-6, 9.01761e-6, -3.4401e-6, 8.12854e-6, -3.4401e-6;
    -1.65308e-6, 4.54998e-7, -1.65308e-6, -3.4401e-6, 1.37201e-6, -3.10875e-6, 1.37201e-6;
    3.84231e-6, -9.23181e-7, 3.84231e-6, 8.12854e-6, -3.10875e-6, 7.75778e-6, -3.10875e-6;
    -1.65308e-6, 4.54998e-7, -1.65308e-6, -3.4401e-6, 1.37201e-6, -3.10875e-6, 1.69201e-6
]
L_c := cholesky(A) = [
    2503.4, 0, 0, 0, 0, 0, 0;
    -290.645, 1023.49, 0, 0, 0, 0, 0;
    -1248.3, -354.487, 1200.45, 0, 0, 0, 0;
    -3.11577, 733.468, 213.35, 2058.52, 0, 0, 0;
    1318.21, 54.061, 1386.72, 2980.1, 3323.46, 0, 0;
    -124.711, -449.489, -262.414, -962.691, 955.001, 699.103, 0;
    0, 0, 0, 0, -940.285, 1284.47, 768.773
]
L_c*transpose(L_c) = [
    6267000, -727600, -3125000, -7800, 3300000, -312200, 0;
    -727600, 1132000, 0, 751600, -327800, -423800, 0;
    -3125000, 0, 3125000, 0, 0, 0, 0;
    -7800, 751600, 0, 4821000, 6466000, -2367000, 0;
    3300000, -327800, 0, 6466000, 23590000, -247600, -3125000;
    -312200, -423800, 0, -2367000, -247600, 2614000, 0;
    0, 0, 0, 0, -3125000, 0, 3125000
]
M := lu(A) = [
    0, 0, 1, 0, 0, 0, 0, 1, 0, 0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;
    0, 1, 0, 0, 0, 0, 0, 0.232832, 1, 0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;
    1, 0, 0, 0, 0, 0, 0, -2.00544, -0.642756, 1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;
    0, 0, 0, 0, 0, 1, 0, 0.099904, -0.374382, -0.218597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;
    0, 0, 0, 1, 0, 0, 0, 0.002496, 0.663958, 0.177725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;
    0, 0, 0, 0, 0, 0, 1, 0, 0, 0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;
    0, 0, 0, 0, 1, 0, 0, -1.056, -0.289576, 1.15517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]
P := submatrix(M, 1, rows(M), 1, rows(M)) = [
    0, 0, 1, 0, 0, 0, 0;
    0, 1, 0, 0, 0, 0, 0;
    1, 0, 0, 0, 0, 0, 0;
    0, 0, 0, 0, 0, 1, 0;
    0, 0, 0, 1, 0, 0, 0;
    0, 0, 0, 0, 0, 0, 1;
    0, 0, 0, 0, 1, 0, 0
]
L := submatrix(M, 1, rows(M), rows(M) + 1, 2*rows(M)) = [
    1, 0, 0, 0, 0, 0, 0;
    0.232832, 1, 0, 0, 0, 0, 0;
    -2.00544, -0.642756, 1, 0, 0, 0, 0;
    0.099904, -0.374382, -0.218597, 1, 0, 0, 0;
    0.002496, 0.663958, 0.177725, -2.1383, 1, 0, 0;
    0, 0, 0, 0, -0.460456, 1, 0;
    -1.056, -0.289576, 1.15517, -3.0956, 3.07518, -1.23323, 1
]
U := submatrix(M, 1, rows(M), 2*rows(M) + 1, 3*rows(M)) = [
    -3125000, 0, 3125000, 0, 0, 0, 0;
    0, 1132000, -727600, 751600, -327800, -423800, 0;
    0, 0, 2674331, 475296, 3089305, -584600, 0;
    0, 0, 0, -1981717, 304990, 2327545, 0;
    0, 0, 0, 0, 6786757, 2995265, 0;
    0, 0, 0, 0, 0, 1379186, 3125000;
    0, 0, 0, 0, 0, 0, 728855
]
L*U = [
    -3125000, 0, 3125000, 0, 0, 0, 0;
    -727600, 1132000, 0, 751600, -327800, -423800, 0;
    6267000, -727600, -3125000, -7800, 3300000, -312200, 0;
    -312200, -423800, 0, -2367000, -247600, 2614000, 0;
    -7800, 751600, 0, 4821000, 6466000, -2367000, 0;
    0, 0, 0, 0, -3125000, 0, 3125000;
    3300000, -327800, 0, 6466000, 23590000, -247600, -3125000
]
b := [1; 2; 3; 4; 5; 6; 7]
x := A^-1*b = [2.8833e-5; -3.52204e-6; 2.9793e-5; 5.76048e-5; -2.1651e-5; 5.52788e-5; -1.9411e-5]
y := L_c^-1*b = [0.000399457; 0.00206754; 0.00352498; 0.00084173; -0.000913191; 0.0137127; -0.0149227]
x := transpose(L_c)^-1*y = [2.8833e-5; -3.52204e-6; 2.9793e-5; 5.76048e-5; -2.1651e-5; 5.52788e-5; -1.9411e-5]
D := diag(vectorize(sqrt(diag(U)))) = [
    1767.77i, 0, 0, 0, 0, 0, 0;
    0, 1063.95, 0, 0, 0, 0, 0;
    0, 0, 1635.34, 0, 0, 0, 0;
    0, 0, 0, 1407.73i, 0, 0, 0;
    0, 0, 0, 0, 2605.14, 0, 0;
    0, 0, 0, 0, 0, 1174.39, 0;
    0, 0, 0, 0, 0, 0, 853.73
]
LU := L_c*transpose(L_c)
L*D = [
    1767.77i, 0, 0, 0, 0, 0, 0;
    411.593i, 1063.95, 0, 0, 0, 0, 0;
    -3545.15i, -683.864, 1635.34, 0, 0, 0, 0;
    176.607i, -398.325, -357.48, 1407.73i, 0, 0, 0;
    4.41235i, 706.421, 290.641, -3010.15i, 2605.14, 0, 0;
    0, 0, 0, 0, -1199.55, 1174.39, 0;
    -1866.76i, -308.096, 1889.09, -4357.78i, 8011.29, -1448.29, 853.73
]
L_c = [
    2503.4, 0, 0, 0, 0, 0, 0;
    -290.645, 1023.49, 0, 0, 0, 0, 0;
    -1248.3, -354.487, 1200.45, 0, 0, 0, 0;
    -3.11577, 733.468, 213.35, 2058.52, 0, 0, 0;
    1318.21, 54.061, 1386.72, 2980.1, 3323.46, 0, 0;
    -124.711, -449.489, -262.414, -962.691, 955.001, 699.103, 0;
    0, 0, 0, 0, -940.285, 1284.47, 768.773
]
D^-1*U = [
    1767.77i, 0, -1767.77i, 0, 0, 0, 0;
    0, 1063.95, -683.864, 706.421, -308.096, -398.325, 0;
    0, 0, 1635.34, 290.641, 1889.09, -357.48, 0;
    0, 0, 0, 1407.73i, -216.653i, -1653.4i, 0;
    0, 0, 0, 0, 2605.14, 1149.75, 0;
    0, 0, 0, 0, 0, 1174.39, 2660.96;
    0, 0, 0, 0, 0, 0, 853.73
]
transpose(L_c) = [
    2503.4, -290.645, -1248.3, -3.11577, 1318.21, -124.711, 0;
    0, 1023.49, -354.487, 733.468, 54.061, -449.489, 0;
    0, 0, 1200.45, 213.35, 1386.72, -262.414, 0;
    0, 0, 0, 2058.52, 2980.1, -962.691, 0;
    0, 0, 0, 0, 3323.46, 955.001, -940.285;
    0, 0, 0, 0, 0, 699.103, 1284.47;
    0, 0, 0, 0, 0, 0, 768.773
]
D_1 := diag(diag(L_c)) = [
    2503.4, 0, 0, 0, 0, 0, 0;
    0, 1023.49, 0, 0, 0, 0, 0;
    0, 0, 1200.45, 0, 0, 0, 0;
    0, 0, 0, 2058.52, 0, 0, 0;
    0, 0, 0, 0, 3323.46, 0, 0;
    0, 0, 0, 0, 0, 699.103, 0;
    0, 0, 0, 0, 0, 0, 768.773
]
D := D_1*D_1 = [
    6267000, 0, 0, 0, 0, 0, 0;
    0, 1047525, 0, 0, 0, 0, 0;
    0, 0, 1441077, 0, 0, 0, 0;
    0, 0, 0, 4237498, 0, 0, 0;
    0, 0, 0, 0, 11045388, 0, 0;
    0, 0, 0, 0, 0, 488744, 0;
    0, 0, 0, 0, 0, 0, 591012
]
D^-1*U = [
    -0.498644, 0, 0.498644, 0, 0, 0, 0;
    0, 1.08064, -0.694589, 0.7175, -0.312928, -0.404572, 0;
    0, 0, 1.85579, 0.32982, 2.14375, -0.405669, 0;
    0, 0, 0, -0.467662, 0.071974, 0.549274, 0;
    0, 0, 0, 0, 0.614443, 0.271178, 0;
    0, 0, 0, 0, 0, 2.8219, 6.39393;
    0, 0, 0, 0, 0, 0, 1.23323
]
L*D = [
    6267000, 0, 0, 0, 0, 0, 0;
    1459158, 1047525, 0, 0, 0, 0, 0;
    -12568092, -673303, 1441077, 0, 0, 0, 0;
    626098, -392174, -315015, 4237498, 0, 0, 0;
    15642.4, 695513, 256116, -9061025, 11045388, 0, 0;
    0, 0, 0, 0, -5085910, 488744, 0;
    -6617952, -303338, 1664688, -13117589, 33966611, -602736, 591012
]
# Αραιή Μήτρα Αγωγιμοτήτων
# [component: outputs Y]
L := cholesky(Y) = [
    3.16228, 0, 0, 0, 0, 0;
    0, 3.16228, 0, 0, 0, 0;
    0, 0, 3.16228, 0, 0, 0;
    0, 0, -0.316228, 3.14643, 0, 0;
    -0.316228, -0.316228, 0, -0.317821, 3.11432, 0;
    -0.316228, -0.316228, -0.316228, -0.0317821, -0.0674629, 3.11359
]
transpose(L) = [
    3.16228, 0, 0, 0, -0.316228, -0.316228;
    0, 3.16228, 0, 0, -0.316228, -0.316228;
    0, 0, 3.16228, -0.316228, 0, -0.316228;
    0, 0, 0, 3.14643, -0.317821, -0.0317821;
    0, 0, 0, 0, 3.11432, -0.0674629;
    0, 0, 0, 0, 0, 3.11359
]
L + transpose(L) = [
    6.32456, 0, 0, 0, -0.316228, -0.316228;
    0, 6.32456, 0, 0, -0.316228, -0.316228;
    0, 0, 6.32456, -0.316228, 0, -0.316228;
    0, 0, -0.316228, 6.29285, -0.317821, -0.0317821;
    -0.316228, -0.316228, 0, -0.317821, 6.22864, -0.0674629;
    -0.316228, -0.316228, -0.316228, -0.0317821, -0.0674629, 6.22718
]
# [component: outputs Y_X]
# Με "-" συμβολίζεται το κενό κελί
# [component: outputs Y_XF]
X := 20
F_X := 24
R_s := F_X/X = 1.2
# Αναδιάταξη: 1->5, 2 -> 6, 3 -> 1, 4 -> 2, 5 -> 3, 6 -> 4
# Πίνακας Αναδιάταξης
P := [
    0, 0, 1, 0, 0, 0;
    0, 0, 0, 1, 0, 0;
    0, 0, 0, 0, 1, 0;
    0, 0, 0, 0, 0, 1;
    1, 0, 0, 0, 0, 0;
    0, 1, 0, 0, 0, 0
]
Y := (P*Y*transpose(P)) = [
    10, -1, 0, -1, 0, 0;
    -1, 10, -1, 0, 0, 0;
    0, -1, 10, 0, -1, -1;
    -1, 0, 0, 10, -1, -1;
    0, 0, -1, -1, 10, 0;
    0, 0, -1, -1, 0, 10
]
L := cholesky(Y) = [
    3.16228, 0, 0, 0, 0, 0;
    -0.316228, 3.14643, 0, 0, 0, 0;
    0, -0.317821, 3.14627, 0, 0, 0;
    -0.316228, -0.0317821, -0.00321048, 3.14626, 0, 0;
    0, 0, -0.317837, -0.318162, 3.13014, 0;
    0, 0, -0.317837, -0.318162, -0.0646129, 3.12947
]
transpose(L) = [
    3.16228, -0.316228, 0, -0.316228, 0, 0;
    0, 3.14643, -0.317821, -0.0317821, 0, 0;
    0, 0, 3.14627, -0.00321048, -0.317837, -0.317837;
    0, 0, 0, 3.14626, -0.318162, -0.318162;
    0, 0, 0, 0, 3.13014, -0.0646129;
    0, 0, 0, 0, 0, 3.12947
]
L + transpose(L) = [
    6.32456, -0.316228, 0, -0.316228, 0, 0;
    -0.316228, 6.29285, -0.317821, -0.0317821, 0, 0;
    0, -0.317821, 6.29253, -0.00321048, -0.317837, -0.317837;
    -0.316228, -0.0317821, -0.00321048, 6.29253, -0.318162, -0.318162;
    0, 0, -0.317837, -0.318162, 6.26027, -0.0646129;
    0, 0, -0.317837, -0.318162, -0.0646129, 6.25894
]
# [component: outputs Y_X]
# Με "-" συμβολίζεται το κενό κελί
# [component: outputs Y_XF]
X := 20
F_X := 26
R_s := F_X/X = 1.3  # Με την αναδιάταξη τα πράγματα γίνανε χειρότερα
# Ο πίνακας παραγόντων για το προηγούμενο ερώτημα με αριθμημένα όλα τα μη μηδενικά στοιχεία πλην των διαγώνιων στοιχείων έχει ως εξής:
# [component: outputs Y_XF]
M := 18
ADIAG := [Y_XF[11]; Y_XF[22]; Y_XF[33]; Y_XF[44]; Y_XF[55]; Y_XF[66]]  # error: This value must be a vector.
ITKT := [1; 3; 5; 7; 10; 14; 19]
ITKM := [5; 6; 5; 6; 4; 6; 3; 5; 6; 1; 2; 4; 6; 1; 2; 3; 4; 5]
AOFFD := -[1i; 1i; 1i; 1i; 1i; 1i; 1i; 1i; 1i; 1i; 1i; 1i; 1i; 1i; 1i; 1i; 1i; 1i]
AOFFD_symbolic := [
    Y_XF[15];
    Y_XF[16];
    Y_XF[25];
    Y_XF[26];
    Y_XF[34];
    Y_XF[36];
    Y_XF[43];
    Y_XF[45];
    Y_XF[46];
    Y_XF[51];
    Y_XF[52];
    Y_XF[54];
    Y_XF[56];
    Y_XF[61];
    Y_XF[62];
    Y_XF[63];
    Y_XF[64];
    Y_XF[65]
]  # error: This value must be a vector.
